# OpenSim document version 40000
MarkerSet:
  Marker RACR: torso (-0.01101493 0.4181726 0.1468657)
  Marker LACR: torso (-0.03389182 0.4217744 -0.1448749)
  Marker C7: torso (-0.07442638 0.4260182 -0.009407285)
  Marker CLAV: torso (0.05197367 0.3830989 0.03105643)
  Marker RASH: torso (0.04497973 0.3841197 0.1592417)
  Marker RPSH: torso (-0.08883842 0.3447004 0.1682492)
  Marker LASH: torso (0.03116762 0.3929952 -0.1574849)
  Marker LPSH: torso (-0.08708107 0.354607 -0.1715167)
  Marker RSJC: humerus_r (-0.02450329 -0.0007310414 0.008382709)
  Marker RUA1: humerus_r (-0.05015084 -0.09834982 0.03029549)
  Marker RUA2: humerus_r (0.02070249 -0.1362204 0.03604907)
  Marker RUA3: humerus_r (0.01034405 -0.2401879 0.0383991)
  Marker RLEL: humerus_r (0.01150052 -0.3114429 0.03766614)
  Marker RMEL: humerus_r (0.01784698 -0.3040333 -0.04745223)
  Marker RFAsuperior: ulna_r (0.002983238 -0.09235618 0.06515453)
  Marker RFAradius: radius_r (0.01699745 -0.246775 0.03658091)
  Marker RFAulna: radius_r (-0.03873905 -0.2408711 -0.005646441)
  Marker LSJC: humerus_l (-0.02903429 0.001229039 -0.01287446)
  Marker LUA1: humerus_l (-0.05971624 -0.093351 -0.01683144)
  Marker LUA2: humerus_l (0.005179614 -0.1510565 -0.03857308)
  Marker LUA3: humerus_l (-0.007377963 -0.2433312 -0.03262979)
  Marker LLEL: humerus_l (0.01708584 -0.3132837 -0.0384341)
  Marker LMEL: humerus_l (0.01401808 -0.3118999 0.05198238)
  Marker LFAsuperior: ulna_l (-0.0139032 -0.07442501 -0.06024943)
  Marker LFAradius: radius_l (0.0184692 -0.2403505 -0.03441419)
  Marker LFAulna: radius_l (-0.04158099 -0.2457618 0.004739018)
  Marker RASI: pelvis (0.0182305 0.007093495 0.1292529)
  Marker LASI: pelvis (0.02992673 0.01447115 -0.1246518)
  Marker RPSI: pelvis (-0.1419565 0.05149115 0.05013278)
  Marker LPSI: pelvis (-0.1355956 0.05861658 -0.06316339)
  Marker LHJC: femur_l (5.525555e-6 0.01295468 -0.0007000225)
  Marker RHJC: femur_r (-6.53397e-6 -0.01094404 0.0008499146)
  Marker RTH1: femur_r (0.03788443 -0.03711725 0.1007665)
  Marker RTH2: femur_r (-0.05697692 -0.1713695 0.07377116)
  Marker RTH3: femur_r (-0.03132885 -0.3257268 0.06772968)
  Marker RLFC: femur_r (-0.02880109 -0.4299376 0.05938763)
  Marker RMFC: femur_r (-0.03415552 -0.4484506 -0.05747078)
  Marker RKJC: tibia_r (-0.03442138 0.00424335 0.001107081)
  Marker RTB1: tibia_r (0.02108089 -0.1313366 0.01093133)
  Marker RTB2: tibia_r (-0.05347432 -0.184245 0.07456129)
  Marker RTB3: tibia_r (0.0197756 -0.3202974 0.002307314)
  Marker RLMAL: tibia_r (-0.01274729 -0.4310644 0.0517464)
  Marker RMMAL: tibia_r (-0.0009653018 -0.4143115 -0.03924174)
  Marker RAJC: talus_r (0.003914618 0.008152305 0.006252329)
  Marker RCAL: calcn_r (-0.01646546 0.01376583 -0.007060656)
  Marker RTOE: calcn_r (0.2279855 0.03707991 -0.0209734)
  Marker RMT5: calcn_r (0.1835795 0.000529308 0.07024849)
  Marker LTH1: femur_l (0.03648175 -0.03870958 -0.09673058)
  Marker LTH2: femur_l (-0.05319871 -0.1862335 -0.06615435)
  Marker LTH3: femur_l (-0.01396629 -0.3227804 -0.06865112)
  Marker LLFC: femur_l (-0.003936019 -0.4409992 -0.05646582)
  Marker LMFC: femur_l (-0.03560388 -0.465019 0.05217123)
  Marker LKJC: tibia_l (-0.02021527 -0.006200057 -0.003236689)
  Marker LTB1: tibia_l (0.0327631 -0.09635566 -0.01755208)
  Marker LTB2: tibia_l (-0.03970827 -0.2080445 -0.06947329)
  Marker LTB3: tibia_l (0.0299615 -0.3114044 -0.01645899)
  Marker LLMAL: tibia_l (-0.005961466 -0.422035 -0.0471511)
  Marker LMMAL: tibia_l (0.00154325 -0.4098453 0.04043094)
  Marker LAJC: talus_l (0.008562211 0.01489987 -0.003360084)
  Marker LCAL: calcn_l (-0.01447007 0.02249253 0.01716824)
  Marker LTOE: calcn_l (0.2237211 0.03326057 0.01612508)
  Marker LMT5: calcn_l (0.1785258 -0.01492775 -0.07652806)
  Marker REJC: ulna_r (0.009229005 0.003439197 0.00373128)
  Marker LEJC: ulna_l (0.004652668 0.0007923613 -0.003065803)
