# OpenSim document version 30000
IKTaskSet ankle_perturb_sim_subject01_walk2:
  # Upper-body markers (anatomical and tracking).
  IKMarkerTask CLAV: apply=true weight=25
  IKMarkerTask C7: apply=true weight=25
  IKMarkerTask LACR: apply=true weight=25
  IKMarkerTask RACR: apply=true weight=25
  IKMarkerTask LLEL: apply=true weight=25
  IKMarkerTask RLEL: apply=true weight=25
  IKMarkerTask LMEL: apply=true weight=25
  IKMarkerTask RMEL: apply=true weight=25
  IKMarkerTask LUA1: apply=true weight=25
  IKMarkerTask RUA1: apply=true weight=25
  IKMarkerTask LUA2: apply=true weight=25
  IKMarkerTask RUA2: apply=true weight=25
  IKMarkerTask LUA3: apply=true weight=25
  IKMarkerTask RUA3: apply=true weight=25
  IKMarkerTask LFAsuperior: apply=true weight=25
  IKMarkerTask RFAsuperior: apply=true weight=25
  IKMarkerTask LFAradius: apply=true weight=25
  IKMarkerTask RFAradius: apply=true weight=25
  IKMarkerTask LFAulna: apply=true weight=25
  IKMarkerTask RFAulna: apply=true weight=25
  # Lower-body anatomical markers
  IKMarkerTask LASI: apply=true weight=100
  IKMarkerTask RASI: apply=true weight=100
  IKMarkerTask LPSI: apply=true weight=100
  IKMarkerTask RPSI: apply=true weight=100
  IKMarkerTask LCAL: apply=true weight=50
  IKMarkerTask RCAL: apply=true weight=50
  IKMarkerTask LTOE: apply=true weight=50
  IKMarkerTask RTOE: apply=true weight=50
  IKMarkerTask LMT5: apply=true weight=50
  IKMarkerTask RMT5: apply=true weight=50
  # Lower-body tracking markers.
  IKMarkerTask LTH1: apply=true weight=50
  IKMarkerTask RTH1: apply=true weight=50
  IKMarkerTask LTH2: apply=true weight=50
  IKMarkerTask RTH2: apply=true weight=50
  IKMarkerTask LTH3: apply=true weight=50
  IKMarkerTask RTH3: apply=true weight=50
  IKMarkerTask LTB1: apply=true weight=50
  IKMarkerTask RTB1: apply=true weight=50
  IKMarkerTask LTB2: apply=true weight=50
  IKMarkerTask RTB2: apply=true weight=50
  IKMarkerTask LTB3: apply=true weight=50
  IKMarkerTask RTB3: apply=true weight=50
