# OpenSim document version 40000
MarkerSet:
  Marker RACR: torso (-0.02560164 0.4485365 0.1524778)
  Marker LACR: torso (-0.0319731 0.4558472 -0.1581997)
  Marker C7: torso (-0.07396419 0.4606387 -0.001175969)
  Marker CLAV: torso (0.0519576 0.4050858 0.02864585)
  Marker RASH: torso (0.04642102 0.4091013 0.1177084)
  Marker RPSH: torso (-0.07357937 0.3919262 0.1835825)
  Marker LASH: torso (0.05135075 0.4155869 -0.1377991)
  Marker LPSH: torso (-0.08851489 0.380393 -0.1830033)
  Marker RUA1: humerus_r (0.0009645395 -0.09546016 0.04814827)
  Marker RUA2: humerus_r (-0.04414565 -0.1266755 0.01754875)
  Marker RUA3: humerus_r (0.01030718 -0.1818359 0.03576917)
  Marker RLEL: humerus_r (0.03091175 -0.2649148 0.03716353)
  Marker RMEL: humerus_r (0.001296327 -0.2633597 -0.04895297)
  Marker RFAsuperior: ulna_r (0.04156207 -0.09623443 0.04641218)
  Marker RFAradius: radius_r (0.01488868 -0.2600512 0.03899448)
  Marker RFAulna: radius_r (-0.03974207 -0.2409097 -0.00437481)
  Marker LUA1: humerus_l (-0.01810158 -0.08574555 -0.05850342)
  Marker LUA2: humerus_l (-0.05948954 -0.1430922 -0.005357502)
  Marker LUA3: humerus_l (0.007117399 -0.2010696 -0.03861434)
  Marker LLEL: humerus_l (0.02435903 -0.2727906 -0.0373003)
  Marker LMEL: humerus_l (0.002426776 -0.2744946 0.0517984)
  Marker LFAsuperior: ulna_l (0.02057069 -0.08859482 -0.05630275)
  Marker LFAradius: radius_l (0.01487181 -0.2535959 -0.04011731)
  Marker LFAulna: radius_l (-0.03917604 -0.2470676 0.006791714)
  Marker RASI: pelvis (0.005439514 0.01058003 0.1379386)
  Marker LASI: pelvis (0.03275661 0.008577231 -0.1200298)
  Marker RPSI: pelvis (-0.1590689 0.06019628 0.03628362)
  Marker LPSI: pelvis (-0.1451253 0.06194525 -0.05746976)
  Marker LHJC: femur_l (0.01549878 -0.008413299 -0.02163306)
  Marker RHJC: femur_r (-0.007272999 0.004338865 0.01971777)
  Marker RTH1: femur_r (0.0266555 -0.08740113 0.1088022)
  Marker RTH2: femur_r (0.05369093 -0.1877923 0.09419522)
  Marker RTH3: femur_r (-0.02405742 -0.3187826 0.08574775)
  Marker RLFC: femur_r (-0.008239405 -0.435657 0.06744942)
  Marker RMFC: femur_r (-0.007844283 -0.4239505 -0.05217467)
  Marker RTB1: tibia_r (0.03069988 -0.1311306 0.01922895)
  Marker RTB2: tibia_r (-0.006518186 -0.2366974 0.06449698)
  Marker RTB3: tibia_r (0.02505757 -0.3074096 0.001069829)
  Marker RLMAL: tibia_r (-0.01290499 -0.3924323 0.04853343)
  Marker RMMAL: tibia_r (0.004222421 -0.3699683 -0.04198947)
  Marker RCAL: calcn_r (-0.01841228 0.02185129 -0.006927564)
  Marker RTOE: calcn_r (0.2190927 0.02863753 -0.0142493)
  Marker RMT5: calcn_r (0.2048922 0.0001492946 0.05834036)
  Marker LTH1: femur_l (0.02351485 -0.05842082 -0.1049973)
  Marker LTH2: femur_l (0.07142925 -0.1875654 -0.0819527)
  Marker LTH3: femur_l (-0.01585573 -0.3010427 -0.08459639)
  Marker LLFC: femur_l (-0.02274162 -0.4604561 -0.06738962)
  Marker LMFC: femur_l (-0.03192612 -0.4614421 0.05051297)
  Marker LTB1: tibia_l (0.02216449 -0.135014 -0.02266415)
  Marker LTB2: tibia_l (-0.009484748 -0.1965123 -0.06701097)
  Marker LTB3: tibia_l (0.01995614 -0.2741141 -0.01433145)
  Marker LLMAL: tibia_l (-0.009599185 -0.3826807 -0.05014008)
  Marker LMMAL: tibia_l (0.004178909 -0.3625041 0.03941997)
  Marker LCAL: calcn_l (-0.01781314 0.02883812 0.01692751)
  Marker LTOE: calcn_l (0.2274826 0.02720392 0.01771883)
  Marker LMT5: calcn_l (0.1970256 -0.004915558 -0.06265472)
