# OpenSim document version 40000
ScaleTool ankle_perturb_sim_subject19:
  mass: 68.5 [kg]
  height: -1
  age: -1
  GenericModelMaker:
    model_file: ..\..\..\generic_model.osim
    marker_set_file: subject19_prescale_markerset.xml
  ModelScaler:
    apply: true
    scaling_order: manualScale measurements
    marker_file: ..\static\expdata\marker_trajectories.trc
    time_range: 0.41667 6.14167
    preserve_mass_distribution: true
    MeasurementSet:
      Measurement torso: apply=true
        MarkerPair: markers=(RASI CLAV)
        MarkerPair: markers=(LASI CLAV)
        MarkerPair: markers=(LPSI C7)
        MarkerPair: markers=(RPSI C7)
        MarkerPair: markers=(RASI RACR)
        MarkerPair: markers=(LASI LACR)
        BodyScale torso: axes=(X Y Z)
      Measurement pelvis_x: apply=true
        MarkerPair: markers=(RASI RPSI)
        MarkerPair: markers=(LASI LPSI)
        BodyScale pelvis: axes=X
      Measurement pelvis_y: apply=true
        MarkerPair: markers=(LPSI LHJC)
        MarkerPair: markers=(RPSI RHJC)
        MarkerPair: markers=(RASI RHJC)
        MarkerPair: markers=(LASI LHJC)
        BodyScale pelvis: axes=Y
      Measurement pelvis_z: apply=true
        MarkerPair: markers=(RPSI LPSI)
        MarkerPair: markers=(RASI LASI)
        BodyScale pelvis: axes=Z
      Measurement thigh: apply=true
        MarkerPair: markers=(LHJC LLFC)
        MarkerPair: markers=(LHJC LMFC)
        MarkerPair: markers=(RHJC RMFC)
        MarkerPair: markers=(RHJC RLFC)
        BodyScale femur_l: axes=(X Y Z)
        BodyScale femur_r: axes=(X Y Z)
      Measurement shank: apply=true
        MarkerPair: markers=(LLFC LLMAL)
        MarkerPair: markers=(LMFC LMMAL)
        MarkerPair: markers=(RLFC RLMAL)
        MarkerPair: markers=(RMFC RMMAL)
        BodyScale tibia_l: axes=(X Y Z)
        BodyScale tibia_r: axes=(X Y Z)
      Measurement foot: apply=true
        MarkerPair: markers=(LCAL LMT5)
        MarkerPair: markers=(LCAL LTOE)
        MarkerPair: markers=(RCAL RTOE)
        MarkerPair: markers=(RCAL RMT5)
        BodyScale talus_l: axes=(X Y Z)
        BodyScale talus_r: axes=(X Y Z)
        BodyScale calcn_l: axes=(X Y Z)
        BodyScale calcn_r: axes=(X Y Z)
        BodyScale toes_l: axes=(X Y Z)
        BodyScale toes_r: axes=(X Y Z)
      Measurement humerus: apply=true
        MarkerPair: markers=(LSJC LMEL)
        MarkerPair: markers=(LSJC LLEL)
        MarkerPair: markers=(RSJC RLEL)
        MarkerPair: markers=(RSJC RMEL)
        BodyScale humerus_l: axes=(X Y Z)
        BodyScale humerus_r: axes=(X Y Z)
      Measurement radius_ulna: apply=true
        MarkerPair: markers=(LLEL LFAradius)
        MarkerPair: markers=(LMEL LFAulna)
        MarkerPair: markers=(RMEL RFAulna)
        MarkerPair: markers=(RLEL RFAradius)
        BodyScale ulna_l: axes=(X Y Z)
        BodyScale ulna_r: axes=(X Y Z)
        BodyScale radius_l: axes=(X Y Z)
        BodyScale radius_r: axes=(X Y Z)
        BodyScale hand_l: axes=(X Y Z)
        BodyScale hand_r: axes=(X Y Z)
  MarkerPlacer:
    apply: true
    marker_file: ..\static\expdata\marker_trajectories.trc
    time_range: 0.41667 6.14167
    output_motion_file: ankle_perturb_sim_subject19_ik_solution.mot
    output_model_file: ..\subject19.osim
    output_marker_file: ankle_perturb_sim_subject19_markerset.xml
    max_marker_movement: -1
    IKTaskSet:
      IKMarkerTask LACR: apply=true weight=100
      IKMarkerTask RACR: apply=true weight=100
      IKMarkerTask CLAV: apply=true weight=250
      IKMarkerTask C7: apply=true weight=250
      IKMarkerTask LASH: apply=true weight=10
      IKMarkerTask RASH: apply=true weight=10
      IKMarkerTask LPSH: apply=true weight=10
      IKMarkerTask RPSH: apply=true weight=10
      IKMarkerTask LSJC: apply=false weight=10
      IKMarkerTask RSJC: apply=false weight=10
      IKMarkerTask LLEL: apply=true weight=50
      IKMarkerTask RLEL: apply=true weight=50
      IKMarkerTask LMEL: apply=true weight=50
      IKMarkerTask RMEL: apply=true weight=50
      IKMarkerTask LFAsuperior: apply=false weight=0
      IKMarkerTask RFAsuperior: apply=false weight=0
      IKMarkerTask LFAradius: apply=true weight=50
      IKMarkerTask RFAradius: apply=true weight=50
      IKMarkerTask LFAulna: apply=true weight=50
      IKMarkerTask RFAulna: apply=true weight=50
      IKMarkerTask LASI: apply=true weight=100
      IKMarkerTask RASI: apply=true weight=100
      IKMarkerTask LPSI: apply=true weight=50
      IKMarkerTask RPSI: apply=true weight=50
      IKMarkerTask LHJC: apply=true weight=100
      IKMarkerTask RHJC: apply=true weight=100
      IKMarkerTask LLFC: apply=true weight=50
      IKMarkerTask RLFC: apply=true weight=50
      IKMarkerTask LMFC: apply=true weight=50
      IKMarkerTask RMFC: apply=true weight=50
      IKMarkerTask LKJC: apply=false weight=100
      IKMarkerTask RKJC: apply=false weight=100
      IKMarkerTask LLMAL: apply=true weight=50
      IKMarkerTask RLMAL: apply=true weight=50
      IKMarkerTask LMMAL: apply=true weight=50
      IKMarkerTask RMMAL: apply=true weight=50
      IKMarkerTask LAJC: apply=false weight=100
      IKMarkerTask RAJC: apply=false weight=100
      IKMarkerTask LCAL: apply=true weight=25
      IKMarkerTask RCAL: apply=true weight=25
      IKMarkerTask LTOE: apply=true weight=25
      IKMarkerTask RTOE: apply=true weight=25
      IKMarkerTask LMT5: apply=true weight=25
      IKMarkerTask RMT5: apply=true weight=25
      IKMarkerTask LEJC: apply=false weight=0
      IKMarkerTask REJC: apply=false weight=0
      IKMarkerTask LTH1: apply=false weight=0
      IKMarkerTask RTH1: apply=false weight=0
      IKMarkerTask LTH2: apply=false weight=0
      IKMarkerTask RTH2: apply=false weight=0
      IKMarkerTask LTH3: apply=false weight=0
      IKMarkerTask RTH3: apply=false weight=0
      IKMarkerTask LTB1: apply=false weight=0
      IKMarkerTask RTB1: apply=false weight=0
      IKMarkerTask LTB2: apply=false weight=0
      IKMarkerTask RTB2: apply=false weight=0
      IKMarkerTask LTB3: apply=false weight=0
      IKMarkerTask RTB3: apply=false weight=0
      IKMarkerTask LUA1: apply=false weight=0
      IKMarkerTask RUA1: apply=false weight=0
      IKMarkerTask LUA2: apply=false weight=0
      IKMarkerTask RUA2: apply=false weight=0
      IKMarkerTask LUA3: apply=false weight=0
      IKMarkerTask RUA3: apply=false weight=0
      IKCoordinateTask [values shared by the 18 below unless stated]: weight=1 value_type=default_value value=0
      IKCoordinateTask pelvis_tilt: apply=true
      IKCoordinateTask pelvis_list: apply=true
      IKCoordinateTask hip_flexion_l: apply=true
      IKCoordinateTask hip_flexion_r: apply=true
      IKCoordinateTask hip_rotation_l: apply=false
      IKCoordinateTask hip_rotation_r: apply=false
      IKCoordinateTask ankle_angle_l: apply=true
      IKCoordinateTask ankle_angle_r: apply=true
      IKCoordinateTask lumbar_bending: apply=true weight=0
      IKCoordinateTask lumbar_rotation: apply=true weight=0
      IKCoordinateTask arm_flex_l: apply=false
      IKCoordinateTask arm_flex_r: apply=false
      IKCoordinateTask arm_rot_l: apply=false
      IKCoordinateTask arm_rot_r: apply=false
      IKCoordinateTask elbow_flex_l: apply=false
      IKCoordinateTask elbow_flex_r: apply=false
      IKCoordinateTask pro_sup_l: apply=false
      IKCoordinateTask pro_sup_r: apply=false
