# OpenSim document version 30000
MarkerSet ankle_perturb_sim_subject02_prescale:
  Marker RACR: torso (-0.003 0.425 0.13)
  Marker LACR: torso (-0.003 0.425 -0.13)
  Marker C7: torso (-0.085 0.435 0.00165426)
  Marker CLAV: torso (0.04 0.38 0.017)
  Marker RASH: torso (0.05 0.3715 0.17)
  Marker RPSH: torso (-0.05 0.3715 0.17)
  Marker LASH: torso (0.05 0.3715 -0.17)
  Marker LPSH: torso (-0.058 0.3715 -0.17)
  Marker RASI: pelvis (0.00953047 0.0180816 0.128464) fixed=true
  Marker LASI: pelvis (0.00953047 0.0180816 -0.128464) fixed=true
  Marker RPSI: pelvis (-0.155 0.035 0.045) fixed=true
  Marker LPSI: pelvis (-0.155 0.035 -0.045) fixed=true
  Marker LHJC: femur_l (0 0 0) fixed=true
  Marker RHJC: femur_r (0 0 0) fixed=true
  Marker RTH1: femur_r (0.018 -0.15 0.064)
  Marker RTH2: femur_r (0.08 -0.23 0.0047)
  Marker RTH3: femur_r (0.01 -0.3 0.06)
  Marker RLFC: femur_r (0 -0.404 0.05) fixed=true
  Marker RMFC: femur_r (0 -0.404 -0.05) fixed=true
  Marker RKJC: tibia_r (0 0 0) fixed=true
  Marker RTB1: tibia_r (-0.00166178 -0.156488 0.0492394)
  Marker RTB2: tibia_r (0.0369643 -0.230107 -0.00391699)
  Marker RTB3: tibia_r (0.0113793 -0.295236 0.0553541)
  Marker RLMAL: tibia_r (-0.005 -0.3888 0.053) fixed=true
  Marker RMMAL: tibia_r (0.006 -0.3888 -0.038) fixed=true
  Marker RAJC: talus_r (0 0 0) fixed=true
  Marker RCAL: calcn_r (-0.025 0.02 -0.005) fixed=true
  Marker RTOE: calcn_r (0.205 0.0197308 -0.03) fixed=true
  Marker RMT5: calcn_r (0.145 0.01491 0.059) fixed=true
  Marker LTH1: femur_l (0.018 -0.15 -0.064)
  Marker LTH2: femur_l (0.08 -0.23 -0.0047)
  Marker LTH3: femur_l (0.01 -0.3 -0.06)
  Marker LLFC: femur_l (0 -0.404 -0.05) fixed=true
  Marker LMFC: femur_l (0 -0.404 0.05) fixed=true
  Marker LKJC: tibia_l (0 0 0) fixed=true
  Marker LTB1: tibia_l (-0.00166178 -0.156488 -0.0492394)
  Marker LTB2: tibia_l (0.0369643 -0.230107 0.00391699)
  Marker LTB3: tibia_l (0.0113793 -0.295236 -0.0553541)
  Marker LLMAL: tibia_l (-0.005 -0.3888 -0.053) fixed=true
  Marker LMMAL: tibia_l (0.006 -0.3888 0.038) fixed=true
  Marker LAJC: talus_l (0 0 0) fixed=true
  Marker LCAL: calcn_l (-0.025 0.02 0.005) fixed=true
  Marker LTOE: calcn_l (0.205 0.01973 0.03) fixed=true
  Marker LMT5: calcn_l (0.145 0.014909 -0.059) fixed=true
