# OpenSim document version 40000
MarkerSet @STUDYNAME@_@SUBJECTNAME@_prescale:
  Marker C7: torso (-0.08 0.42 0.003)
  Marker RSHL: torso (0 0.418 0.142)
  Marker LSHL: torso (0 0.418 -0.142)
  Marker CLAV: torso (0.046 0.385 0)
  Marker RASI: pelvis (0.028 0.01 0.128)
  Marker LASI: pelvis (0.028 0.01 -0.128)
  Marker RPSI: pelvis (-0.154 0.025 0.05)
  Marker LPSI: pelvis (-0.154 0.025 -0.05)
  Marker R_HJC: femur_r (0 0 0)
  Marker L_HJC: femur_l (0 0 0)
  Marker RTH1: femur_r (0.08 -0.324 0.0047)
  Marker RTH2: femur_r (0.08 -0.324 0.0047)
  Marker RTH3: femur_r (0.08 -0.324 0.0047)
  Marker RLKN: femur_r (0.008 -0.404 0.055)
  Marker RMKN: femur_r (0.011 -0.401 -0.055)
  Marker RSH1: tibia_r (0.0104 -0.2322 0.0748)
  Marker RSH2: tibia_r (0.0104 -0.2322 0.0748)
  Marker RSH3: tibia_r (0.0104 -0.2322 0.0748)
  Marker RLAK: tibia_r (-0.01743173 -0.3850714 0.04727037)
  Marker RMAK: tibia_r (0.006 -0.38 -0.038)
  Marker RTOE: calcn_r (0.186844 0.00836653 0.00526621)
  Marker RMT5: calcn_r (0.14 0.005 0.065)
  Marker RCAL: calcn_r (-0.0321615 0.01491079 -0.0111695)
  Marker LTH1: femur_l (0.08 -0.324 -0.0047)
  Marker LTH2: femur_l (0.08 -0.324 -0.0047)
  Marker LTH3: femur_l (0.08 -0.324 -0.0047)
  Marker LLKN: femur_l (0.008 -0.404 -0.055)
  Marker LMKN: femur_l (0.011 -0.401 0.055)
  Marker LLAK: tibia_l (-0.017 -0.385 -0.047)
  Marker LSH1: tibia_l (0.0125 -0.3196 -0.06)
  Marker LSH2: tibia_l (0.0125 -0.3196 -0.06)
  Marker LSH3: tibia_l (0.0125 -0.3196 -0.06)
  Marker LMAK: tibia_l (0.006 -0.38 0.038)
  Marker LTOE: calcn_l (0.186844 0.00836653 -0.005)
  Marker LCAL: calcn_l (-0.03 0.01459576 0.01)
  Marker LMT5: calcn_l (0.14 0.005 -0.065)
  Marker midASIS: pelvis (0.028 0.01 0)
  Marker RMT5_proj: calcn_r (0.14 0 0.065)
  Marker LMT5_proj: calcn_l (0.14 0 -0.065)
  Marker RTOE_proj: calcn_r (0.19 0 0.005)
  Marker LTOE_proj: calcn_l (0.19 0 -0.005)
  Marker L_AJC: tibia_l (-0.0055 -0.3825 -0.0045) fixed=true
  Marker L_AJC_proj: talus_l (0 -0.042 0)
  Marker L_KJC: femur_l (0.0095 -0.4025 0) fixed=true
  Marker R_AJC: tibia_r (-0.0055 -0.3825 0.0045) fixed=true
  Marker R_AJC_proj: talus_r (0 -0.042 0)
  Marker R_KJC: femur_r (0.0095 -0.4025 0)
  Marker midHJC: pelvis (-0.056276 -0.07849 0)
  Marker midPelvis: pelvis (-0.063 0.0175 0)
  Marker midPSIS: pelvis (-0.154 0.025 0)
  Marker LULN: ulna_l (-0.03418138 -0.225 -0.001694939)
  Marker RULN: ulna_r (-0.0341814 -0.225 -0.00169494)
  Marker LRAD: radius_l (-0.02 -0.225 -0.05)
  Marker RRAD: radius_r (-0.02 -0.225 0.05)
  Marker LFA: radius_l (-0.06930156 -0.0800579 -0.02274648)
  Marker RFA: radius_r (-0.0693016 -0.0800579 0.0227465)
  Marker LLEL: humerus_l (0.015 -0.28 -0.04)
  Marker RLEL: humerus_r (0.015 -0.28 0.04)
  Marker RASH: humerus_r (0.05 0 0)
  Marker RPSH: humerus_r (-0.05 0 0)
  Marker LASH: humerus_l (0.05 0 0)
  Marker LPSH: humerus_l (-0.05 0 0)
  Marker RUA1: humerus_r (0 -0.05 0.02)
  Marker RUA2: humerus_r (0 -0.2 0.02)
  Marker RUA3: humerus_r (0.03 -0.13 0.02)
  Marker LUA1: humerus_l (0 -0.05 -0.02)
  Marker LUA2: humerus_l (0 -0.2 -0.02)
  Marker LUA3: humerus_l (0.03 -0.13 -0.02)
