# OpenSim document version 40000
Model ankle_perturb_sim_subject01:
  gravity: 0 -9.80665 0
  length_units: meters
  force_units: N
  Ground
  BodySet:
    Body pelvis: mass=11.38822 [kg] mass_center=(-0.06985591 0 0) inertia=(0.1188128 0.1188128 0.05637962 0 0 0)
        meshes=(r_pelvis.vtp l_pelvis.vtp sacrum.vtp)
      WrapCylinder Gmax1_at_pelvis_r: xyz_body_rotation=(-0.6 0.45 0) translation=(-0.07608069 -0.100896 0.06871682)
          quadrant=-x radius=0.0412681 length=0.1611424
      WrapCylinder Gmax2_at_pelvis_r: xyz_body_rotation=(-0.75 0.39 0) translation=(-0.07904488 -0.08458955 0.07660236)
          quadrant=all radius=0.0414385 length=0.1065431
      WrapCylinder Gmax3_at_pelvis_r: xyz_body_rotation=(-0.1 0 0) translation=(-0.08200906 -0.08968531 0.07660236)
          quadrant=all radius=0.04016676 length=0.1125486
      WrapCylinder Gmax1_at_pelvis_l: xyz_body_rotation=(0.6 -0.45 0) translation=(-0.07608069 -0.100896 -0.06871682)
          quadrant=-x radius=0.0412681 length=0.1611424
      WrapCylinder Gmax2_at_pelvis_l: xyz_body_rotation=(0.75 -0.39 0)
          translation=(-0.07904488 -0.08458955 -0.07660236) quadrant=all radius=0.0414385 length=0.1065431
      WrapCylinder Gmax3_at_pelvis_l: xyz_body_rotation=(0.1 0 0) translation=(-0.08200906 -0.08968531 -0.07660236)
          quadrant=all radius=0.04016676 length=0.1125486
      WrapCylinder PS_at_brim_r: xyz_body_rotation=(-0.25 -0.27 0.1) translation=(-0.07311651 -0.06114907 0.07389875)
          quadrant=-y radius=0.05060135 length=0.1111346
      WrapCylinder PS_at_brim_l: xyz_body_rotation=(0.25 0.27 0.1) translation=(-0.07311651 -0.06114907 -0.07389875)
          quadrant=-y radius=0.05060135 length=0.1111346
      WrapCylinder IL_at_brim_r: xyz_body_rotation=(-0.32 -0.24 0.9) translation=(-0.07015233 -0.06624483 0.0851638)
          quadrant=-y radius=0.05562198 length=0.110949
      WrapCylinder IL_at_brim_l: xyz_body_rotation=(0.32 0.24 0.9) translation=(-0.07015233 -0.06624483 -0.0851638)
          quadrant=-y radius=0.05562198 length=0.110949
    Body femur_r: mass=8.994345 mass_center=(0 -0.1885833 0) inertia=(0.1593348 0.04176737 0.1680214 0 0 0)
        meshes=r_femur.vtp
      WrapCylinder Gastroc_at_condyles_r: translation=(0.005546569 -0.4548186 0) quadrant=all radius=0.02773284
          length=0.1109314
      WrapCylinder KnExt_at_fem_r: xyz_body_rotation=(-0.0623366 0.0507601 0)
          translation=(0.003980528 -0.4467561 0.002319697) quadrant=all radius=0.02773284 length=0.1109314
      WrapCylinder AB_at_femshaft_r: xyz_body_rotation=(1.66157 0.186644 0)
          translation=(0.01624412 -0.1249032 0.02591912) quadrant=all radius=0.01830368 length=0.07765196
      WrapCylinder AL_at_femshaft_r: xyz_body_rotation=(1.77711 0.136489 0)
          translation=(0.03409221 -0.2572598 0.01676583) quadrant=all radius=0.02229721 length=0.1109314
      WrapCylinder AMprox_at_femshaft_r: xyz_body_rotation=(1.61126 0.18656 0)
          translation=(0.005749562 -0.0808632 0.0281799) quadrant=all radius=0.02340652 length=0.07765196
      WrapCylinder AMmid_at_femshaft_r: xyz_body_rotation=(1.61139 0.13656 0)
          translation=(0.02552808 -0.1782789 0.02283434) quadrant=all radius=0.02373931 length=0.1331176
      WrapCylinder AMdist_at_femshaft_r: xyz_body_rotation=(1.71188 0.186636 0)
          translation=(0.03506152 -0.289238 0.01038828) quadrant=all radius=0.02418304 length=0.2218627
      WrapCylinder AMisch_at_condyles_r: xyz_body_rotation=(1.71115 -0.463363 0)
          translation=(-0.02512718 -0.4180238 -0.003499186) quadrant=all radius=0.04437255 length=0.2662353
      WrapCylinder PECT_at_femshaft_r: xyz_body_rotation=(1.81295 0.276344 0)
          translation=(0.006750984 -0.09374023 0.03376806) quadrant=all radius=0.01663971 length=0.05546569
    Body tibia_r: mass=3.585109 mass_center=(0 -0.2010947 0) inertia=(0.05654109 0.00572142 0.05732639 0 0 0)
        meshes=(r_tibia.vtp r_fibula.vtp)
      WrapCylinder GasLat_at_shank_r: xyz_body_rotation=(2.96723 -0.279725 -1.47812)
          translation=(-0.007970543 -0.07970543 -0.003554432) quadrant=-y radius=0.05924053 length=0.10771
      WrapCylinder GasMed_at_shank_r: xyz_body_rotation=(2.96723 0.0279725 -1.47812)
          translation=(-0.007970543 -0.07970543 -0.003554432) quadrant=-y radius=0.05924053 length=0.10771
      WrapCylinder GR_at_condyles_r: xyz_body_rotation=(0 -0.4 0) translation=(-0.003231301 -0.02154201 0) quadrant=all
          radius=0.03877562 length=0.10771
      WrapCylinder SM_at_condyles_r: xyz_body_rotation=(0 -0.1 0) translation=(-0.0010771 -0.02154201 0) quadrant=all
          radius=0.03791394 length=0.10771
      WrapCylinder ST_at_condyles_r: xyz_body_rotation=(0 -0.2 0) translation=(-0.002154201 -0.02208056 0) quadrant=all
          radius=0.04577677 length=0.10771
      WrapCylinder BF_at_gastroc_r: translation=(-0.06247183 -0.06462603 0) quadrant=y radius=0.03231301
          length=0.1615651
    Body patella_r: mass=0.08335439 mass_center=(0.0018 0.0264 0) inertia=(2.775257e-6 1.267722e-5 1.267722e-5 0 0 0)
        meshes=r_patella.vtp
    Body talus_r: mass=0.09669883 mass_center=(0 0 0) inertia=(0.001210054 0.001210054 0.001210054 0 0 0)
        meshes=r_talus.vtp
    Body calcn_r: mass=1.208735 mass_center=(0.1118644 0.03355931 0) inertia=(0.001694075 0.00471921 0.004961221 0 0 0)
        meshes=r_foot.vtp
    Body toes_r: mass=0.2094497 mass_center=(0.03870507 0.006711862 -0.01957626)
        inertia=(0.0001210054 0.0002420108 0.001210054 0 0 0) meshes=r_bofoot.vtp
    Body femur_l: mass=8.994345 mass_center=(0 -0.1885833 0) inertia=(0.1593348 0.04176737 0.1680214 0 0 0)
        meshes=l_femur.vtp
      WrapCylinder Gastroc_at_condyles_l: translation=(0.005546569 -0.4548186 0) quadrant=all radius=0.02773284
          length=0.1109314
      WrapCylinder KnExt_at_fem_l: xyz_body_rotation=(0.0623366 -0.0507601 0)
          translation=(0.003980528 -0.4467561 -0.002319697) quadrant=all radius=0.02773284 length=0.1109314
      WrapCylinder AB_at_femshaft_l: xyz_body_rotation=(-1.66157 -0.186644 0)
          translation=(0.01624412 -0.1249032 -0.02591912) quadrant=all radius=0.01830368 length=0.07765196
      WrapCylinder AL_at_femshaft_l: xyz_body_rotation=(-1.77711 -0.136489 0)
          translation=(0.03409221 -0.2572598 -0.01676583) quadrant=all radius=0.02229721 length=0.1109314
      WrapCylinder AMprox_at_femshaft_l: xyz_body_rotation=(-1.61126 -0.18656 0)
          translation=(0.005749562 -0.0808632 -0.0281799) quadrant=all radius=0.02340652 length=0.07765196
      WrapCylinder AMmid_at_femshaft_l: xyz_body_rotation=(-1.61139 -0.13656 0)
          translation=(0.02552808 -0.1782789 -0.02283434) quadrant=all radius=0.02373931 length=0.1331176
      WrapCylinder AMdist_at_femshaft_l: xyz_body_rotation=(-1.71188 -0.186636 0)
          translation=(0.03506152 -0.289238 -0.01038828) quadrant=all radius=0.02418304 length=0.2218627
      WrapCylinder AMisch_at_condyles_l: xyz_body_rotation=(-1.71115 0.463363 0)
          translation=(-0.02512718 -0.4180238 0.003499186) quadrant=all radius=0.04437255 length=0.2662353
      WrapCylinder PECT_at_femshaft_l: xyz_body_rotation=(-1.81295 -0.276344 0)
          translation=(0.006750984 -0.09374023 -0.03376806) quadrant=all radius=0.01663971 length=0.05546569
    Body tibia_l: mass=3.585109 mass_center=(0 -0.2010947 0) inertia=(0.05654109 0.00572142 0.05732639 0 0 0)
        meshes=(l_tibia.vtp l_fibula.vtp)
      WrapCylinder GasLat_at_shank_l: xyz_body_rotation=(-2.96723 0.279725 -1.47812)
          translation=(-0.007970543 -0.07970543 0.003554432) quadrant=-y radius=0.05924053 length=0.10771
      WrapCylinder GasMed_at_shank_l: xyz_body_rotation=(-2.96723 -0.0279725 -1.47812)
          translation=(-0.007970543 -0.07970543 0.003554432) quadrant=-y radius=0.05924053 length=0.10771
      WrapCylinder GR_at_condyles_l: xyz_body_rotation=(0 0.4 0) translation=(-0.003231301 -0.02154201 0) quadrant=all
          radius=0.03877562 length=0.10771
      WrapCylinder SM_at_condyles_l: xyz_body_rotation=(0 0.1 0) translation=(-0.0010771 -0.02154201 0) quadrant=all
          radius=0.03791394 length=0.10771
      WrapCylinder ST_at_condyles_l: xyz_body_rotation=(0 0.2 0) translation=(-0.002154201 -0.02208056 0) quadrant=all
          radius=0.04577677 length=0.10771
      WrapCylinder BF_at_gastroc_l: translation=(-0.06247183 -0.06462603 0) quadrant=all radius=0.03231301
          length=0.1615651
    Body patella_l: mass=0.08335439 mass_center=(0.0018 0.0264 0) inertia=(2.775257e-6 1.267722e-5 1.267722e-5 0 0 0)
        meshes=l_patella.vtp
    Body talus_l: mass=0.09669883 mass_center=(0 0 0) inertia=(0.001210054 0.001210054 0.001210054 0 0 0)
        meshes=l_talus.vtp
    Body calcn_l: mass=1.208735 mass_center=(0.1118644 0.03355931 0) inertia=(0.001694075 0.00471921 0.004961221 0 0 0)
        meshes=l_foot.vtp
    Body toes_l: mass=0.2094497 mass_center=(0.03870507 0.006711862 0.01957626)
        inertia=(0.0001210054 0.0002420108 0.001210054 0 0 0) meshes=l_bofoot.vtp
    Body torso: mass=33.10639 mass_center=(-0.02977417 0.3175911 0) inertia=(1.404439 0.7196021 1.363386 0 0 0)
        meshes=(hat_spine.vtp hat_jaw.vtp hat_skull.vtp hat_ribs_scap.vtp)
      PhysicalOffsetFrame head: socket_parent=.. translation=(0 0.5458597 0) [meters]
  JointSet:
    CustomJoint ground_pelvis: socket_parent_frame=ground_offset socket_child_frame=pelvis_offset
      Coordinate pelvis_tilt: default_value=0 range=(-1.570796 1.570796) clamped=true
      Coordinate pelvis_list: default_value=0 range=(-1.570796 1.570796) clamped=true
      Coordinate pelvis_rotation: default_value=0 range=(-1.570796 1.570796) clamped=true
      Coordinate pelvis_tx: default_value=0 range=(-5 5) clamped=true
      Coordinate pelvis_ty: default_value=0.93 range=(-1 2) clamped=true
      Coordinate pelvis_tz: default_value=0 range=(-3 3) clamped=true
      PhysicalOffsetFrame ground_offset: socket_parent=/ground translation=(0 0 0)
      PhysicalOffsetFrame pelvis_offset: socket_parent=/bodyset/pelvis translation=(0 0 0)
      SpatialTransform:
        TransformAxis rotation1: coordinates=pelvis_tilt axis=(0 0 1) LinearFunction(coefficients=1 0)
        TransformAxis rotation2: coordinates=pelvis_list axis=(1 0 0) LinearFunction(coefficients=1 0)
        TransformAxis rotation3: coordinates=pelvis_rotation axis=(0 1 0) LinearFunction(coefficients=1 0)
        TransformAxis translation1: coordinates=pelvis_tx axis=(1 0 0) LinearFunction(coefficients=1 0)
        TransformAxis translation2: coordinates=pelvis_ty axis=(0 1 0) LinearFunction(coefficients=1 0)
        TransformAxis translation3: coordinates=pelvis_tz axis=(0 0 1) LinearFunction(coefficients=1 0)
    CustomJoint hip_r: socket_parent_frame=pelvis_offset socket_child_frame=femur_r_offset
      Coordinate hip_flexion_r: default_value=0 range=(-0.5235988 2.094395) clamped=true
      Coordinate hip_adduction_r: default_value=0 range=(-0.8726646 0.5235988) clamped=true
      Coordinate hip_rotation_r: default_value=0 range=(-0.6981317 0.6981317) clamped=true
      PhysicalOffsetFrame pelvis_offset: socket_parent=/bodyset/pelvis translation=(-0.05560412 -0.07999318 0.0870338)
      PhysicalOffsetFrame femur_r_offset: socket_parent=/bodyset/femur_r translation=(0 0 0)
      SpatialTransform: axes_held_at_zero=(translation1 translation2 translation3)
        TransformAxis rotation1: coordinates=hip_flexion_r axis=(0 0 1) LinearFunction(coefficients=1 0)
        TransformAxis rotation2: coordinates=hip_adduction_r axis=(1 0 0) LinearFunction(coefficients=1 0)
        TransformAxis rotation3: coordinates=hip_rotation_r axis=(0 1 0) LinearFunction(coefficients=1 0)
    CustomJoint walker_knee_r: socket_parent_frame=femur_r_offset socket_child_frame=tibia_r_offset
      Coordinate knee_angle_r: default_value=0 range=(0 2.0944) clamped=true
      PhysicalOffsetFrame femur_r_offset: socket_parent=/bodyset/femur_r
          translation=(-0.008974348 -0.4525556 -0.003050613) orientation=(-1.64157 1.44618 1.5708) [radians]
      PhysicalOffsetFrame tibia_r_offset: socket_parent=/bodyset/tibia_r
          translation=(-0.008713247 -0.003807335 -0.001599214) orientation=(-1.64157 1.44618 1.5708)
      SpatialTransform: axes_held_at_zero=translation3
        TransformAxis rotation1: coordinates=knee_angle_r axis=(1 0 0) LinearFunction(coefficients=1 0)
        TransformAxis rotation2: coordinates=knee_angle_r axis=(0 0 1)
          SimmSpline: x=(0 0.174533 0.349066 0.523599 0.698132 0.872665 1.0472 1.22173 1.39626 1.5708 1.74533 1.91986 2.0944)
              y=(0 0.0126809 0.0226969 0.0296054 0.0332049 0.0335354 0.0308779 0.0257548 0.0189295 0.011407 0.00443314 -0.00050475 -0.0016782)
        TransformAxis rotation3: coordinates=knee_angle_r axis=(0 1 0)
          SimmSpline: x=(0 0.174533 0.349066 0.523599 0.698132 0.872665 1.0472 1.22173 1.39626 1.5708 1.74533 1.91986 2.0944)
              y=(0 0.059461 0.109399 0.150618 0.18392 0.210107 0.229983 0.24435 0.254012 0.25977 0.262428 0.262788 0.261654)
        TransformAxis translation1: coordinates=knee_angle_r axis=(0 1 0)
          MultiplierFunction: scale=1.109314
            SimmSpline: x=(0 0.174533 0.349066 0.523599 0.698132 0.872665 1.0472 1.22173 1.39626 1.5708 1.74533 1.91986 2.0944)
                y=(0 0.000479 0.000835 0.001086 0.001251 0.001346 0.001391 0.001403 0.0014 0.0014 0.001421 0.001481 0.001599)
        TransformAxis translation2: coordinates=knee_angle_r axis=(0 0 1)
          MultiplierFunction: scale=1.109314
            SimmSpline: x=(0 0.174533 0.349066 0.523599 0.698132 0.872665 1.0472 1.22173 1.39626 1.5708 1.74533 1.91986 2.0944)
                y=(0 0.000988 0.001899 0.002734 0.003492 0.004173 0.004777 0.005305 0.005756 0.00613 0.006427 0.006648 0.006792)
    CustomJoint patellofemoral_r: socket_parent_frame=femur_r_offset socket_child_frame=patella_r_offset
      Coordinate knee_angle_r_beta: default_value=0 range=(-99999.9 99999.9) clamped=false
      PhysicalOffsetFrame femur_r_offset: socket_parent=/bodyset/femur_r
          translation=(-0.008974348 -0.4525556 -0.003050613)
      PhysicalOffsetFrame patella_r_offset: socket_parent=/bodyset/patella_r translation=(0 0 0)
      SpatialTransform: axes_held_at_zero=(rotation2 rotation3)
        TransformAxis rotation1: coordinates=knee_angle_r_beta axis=(0 0 1)
          SimmSpline: x=(0 0.174533 0.349066 0.523599 0.698132 0.872665 1.0472 1.22173 1.39626 1.5708 1.74533 1.91986 2.0944)
              y=(0.00113686 -0.00629212 -0.105582 -0.253683 -0.414245 -0.579047 -0.747244 -0.91799 -1.09044 -1.26379 -1.43763 -1.61186 -1.78634)
        TransformAxis translation1: coordinates=knee_angle_r_beta axis=(1 0 0)
          MultiplierFunction: scale=1.109314
            SimmSpline: x=(0 0.174533 0.349066 0.523599 0.698132 0.872665 1.0472 1.22173 1.39626 1.5708 1.74533 1.91986 2.0944)
                y=(0.0524 0.0488 0.0437 0.0371 0.0296 0.0216 0.0136 0.0057 -0.0019 -0.0088 -0.0148 -0.0196 -0.0227)
        TransformAxis translation2: coordinates=knee_angle_r_beta axis=(0 1 0)
          MultiplierFunction: scale=1.109314
            SimmSpline: x=(0 0.174533 0.349066 0.523599 0.698132 0.872665 1.0472 1.22173 1.39626 1.5708 1.74533 1.91986 2.0944)
                y=(-0.0108 -0.019 -0.0263 -0.0322 -0.0367 -0.0395 -0.0408 -0.0404 -0.0384 -0.0349 -0.0301 -0.0245 -0.0187)
        TransformAxis translation3: axis=(0 0 1) MultiplierFunction(scale=1.109314, Constant(value=0.00275))
    PinJoint ankle_r: socket_parent_frame=tibia_r_offset socket_child_frame=talus_r_offset
      Coordinate ankle_angle_r: default_value=0 range=(-0.6981317 0.5235988) clamped=true
      PhysicalOffsetFrame tibia_r_offset: socket_parent=/bodyset/tibia_r translation=(-0.010771 -0.4308402 0)
          orientation=(0.175895 -0.105208 0.0186622)
      PhysicalOffsetFrame talus_r_offset: socket_parent=/bodyset/talus_r translation=(0 0 0)
          orientation=(0.175895 -0.105208 0.0186622)
    PinJoint subtalar_r: socket_parent_frame=talus_r_offset socket_child_frame=calcn_r_offset
      Coordinate subtalar_angle_r: default_value=0 range=(-0.3490659 0.3490659) clamped=false
      PhysicalOffsetFrame talus_r_offset: socket_parent=/bodyset/talus_r
          translation=(-0.05455625 -0.0469271 0.008859657) orientation=(-1.76819 0.906223 1.8196)
      PhysicalOffsetFrame calcn_r_offset: socket_parent=/bodyset/calcn_r translation=(0 0 0)
          orientation=(-1.76819 0.906223 1.8196)
    PinJoint mtp_r: socket_parent_frame=calcn_r_offset socket_child_frame=toes_r_offset
      Coordinate mtp_angle_r: default_value=0 range=(-0.5235988 0.5235988) clamped=false
      PhysicalOffsetFrame calcn_r_offset: socket_parent=/bodyset/calcn_r
          translation=(0.2000135 -0.002237287 0.001208135) orientation=(-3.14159 0.619901 0)
      PhysicalOffsetFrame toes_r_offset: socket_parent=/bodyset/toes_r translation=(0 0 0)
          orientation=(-3.14159 0.619901 0)
    CustomJoint hip_l: socket_parent_frame=pelvis_offset socket_child_frame=femur_l_offset
      Coordinate hip_flexion_l: default_value=0 range=(-0.5235988 2.094395) clamped=true
      Coordinate hip_adduction_l: default_value=0 range=(-0.8726646 0.5235988) clamped=true
      Coordinate hip_rotation_l: default_value=0 range=(-0.6981317 0.6981317) clamped=true
      PhysicalOffsetFrame pelvis_offset: socket_parent=/bodyset/pelvis translation=(-0.05560412 -0.07999318 -0.0870338)
      PhysicalOffsetFrame femur_l_offset: socket_parent=/bodyset/femur_l translation=(0 0 0)
      SpatialTransform: axes_held_at_zero=(translation1 translation2 translation3)
        TransformAxis rotation1: coordinates=hip_flexion_l axis=(0 0 1) LinearFunction(coefficients=1 0)
        TransformAxis rotation2: coordinates=hip_adduction_l axis=(1 0 0) LinearFunction(coefficients=-1 0)
        TransformAxis rotation3: coordinates=hip_rotation_l axis=(0 1 0) LinearFunction(coefficients=-1 0)
    CustomJoint walker_knee_l: socket_parent_frame=femur_l_offset socket_child_frame=tibia_l_offset
      Coordinate knee_angle_l: default_value=0 range=(0 2.0944) clamped=true
      PhysicalOffsetFrame femur_l_offset: socket_parent=/bodyset/femur_l
          translation=(-0.008974348 -0.4525556 0.003050613) orientation=(1.64157 -1.44618 1.5708)
      PhysicalOffsetFrame tibia_l_offset: socket_parent=/bodyset/tibia_l
          translation=(-0.008713247 -0.003807335 0.001599214) orientation=(1.64157 -1.44618 1.5708)
      SpatialTransform: axes_held_at_zero=translation3
        TransformAxis rotation1: coordinates=knee_angle_l axis=(-1 0 0) LinearFunction(coefficients=1 0)
        TransformAxis rotation2: coordinates=knee_angle_l axis=(0 0 1)
          SimmSpline: x=(0 0.174533 0.349066 0.523599 0.698132 0.872665 1.0472 1.22173 1.39626 1.5708 1.74533 1.91986 2.0944)
              y=(0 0.0126809 0.0226969 0.0296054 0.0332049 0.0335354 0.0308779 0.0257548 0.0189295 0.011407 0.00443314 -0.00050475 -0.0016782)
        TransformAxis rotation3: coordinates=knee_angle_l axis=(0 1 0)
          SimmSpline: x=(0 0.174533 0.349066 0.523599 0.698132 0.872665 1.0472 1.22173 1.39626 1.5708 1.74533 1.91986 2.0944)
              y=(0 -0.059461 -0.109399 -0.150618 -0.18392 -0.210107 -0.229983 -0.24435 -0.254012 -0.25977 -0.262428 -0.262788 -0.261654)
        TransformAxis translation1: coordinates=knee_angle_l axis=(0 1 0)
          MultiplierFunction: scale=1.109314
            SimmSpline: x=(0 0.174533 0.349066 0.523599 0.698132 0.872665 1.0472 1.22173 1.39626 1.5708 1.74533 1.91986 2.0944)
                y=(0 0.000479 0.000835 0.001086 0.001251 0.001346 0.001391 0.001403 0.0014 0.0014 0.001421 0.001481 0.001599)
        TransformAxis translation2: coordinates=knee_angle_l axis=(0 0 1)
          MultiplierFunction: scale=1.109314
            SimmSpline: x=(0 0.174533 0.349066 0.523599 0.698132 0.872665 1.0472 1.22173 1.39626 1.5708 1.74533 1.91986 2.0944)
                y=(0 -0.000988 -0.001899 -0.002734 -0.003492 -0.004173 -0.004777 -0.005305 -0.005756 -0.00613 -0.006427 -0.006648 -0.006792)
    CustomJoint patellofemoral_l: socket_parent_frame=femur_l_offset socket_child_frame=patella_l_offset
      Coordinate knee_angle_l_beta: default_value=0 range=(-99999.9 99999.9) clamped=false
      PhysicalOffsetFrame femur_l_offset: socket_parent=/bodyset/femur_l
          translation=(-0.008974348 -0.4525556 0.003050613)
      PhysicalOffsetFrame patella_l_offset: socket_parent=/bodyset/patella_l translation=(0 0 0)
      SpatialTransform: axes_held_at_zero=(rotation2 rotation3)
        TransformAxis rotation1: coordinates=knee_angle_l_beta axis=(0 0 1)
          SimmSpline: x=(0 0.174533 0.349066 0.523599 0.698132 0.872665 1.0472 1.22173 1.39626 1.5708 1.74533 1.91986 2.0944)
              y=(0.00113686 -0.00629212 -0.105582 -0.253683 -0.414245 -0.579047 -0.747244 -0.91799 -1.09044 -1.26379 -1.43763 -1.61186 -1.78634)
        TransformAxis translation1: coordinates=knee_angle_l_beta axis=(1 0 0)
          MultiplierFunction: scale=1.109314
            SimmSpline: x=(0 0.174533 0.349066 0.523599 0.698132 0.872665 1.0472 1.22173 1.39626 1.5708 1.74533 1.91986 2.0944)
                y=(0.0524 0.0488 0.0437 0.0371 0.0296 0.0216 0.0136 0.0057 -0.0019 -0.0088 -0.0148 -0.0196 -0.0227)
        TransformAxis translation2: coordinates=knee_angle_l_beta axis=(0 1 0)
          MultiplierFunction: scale=1.109314
            SimmSpline: x=(0 0.174533 0.349066 0.523599 0.698132 0.872665 1.0472 1.22173 1.39626 1.5708 1.74533 1.91986 2.0944)
                y=(-0.0108 -0.019 -0.0263 -0.0322 -0.0367 -0.0395 -0.0408 -0.0404 -0.0384 -0.0349 -0.0301 -0.0245 -0.0187)
        TransformAxis translation3: axis=(0 0 1) MultiplierFunction(scale=1.109314, Constant(value=-0.00275))
    PinJoint ankle_l: socket_parent_frame=tibia_l_offset socket_child_frame=talus_l_offset
      Coordinate ankle_angle_l: default_value=0 range=(-0.6981317 0.5235988) clamped=true
      PhysicalOffsetFrame tibia_l_offset: socket_parent=/bodyset/tibia_l translation=(-0.010771 -0.4308402 0)
          orientation=(-0.175895 0.105208 0.0186622)
      PhysicalOffsetFrame talus_l_offset: socket_parent=/bodyset/talus_l translation=(0 0 0)
          orientation=(-0.175895 0.105208 0.0186622)
    PinJoint subtalar_l: socket_parent_frame=talus_l_offset socket_child_frame=calcn_l_offset
      Coordinate subtalar_angle_l: default_value=0 range=(-0.3490659 0.3490659) clamped=false
      PhysicalOffsetFrame talus_l_offset: socket_parent=/bodyset/talus_l
          translation=(-0.05455625 -0.0469271 -0.008859657) orientation=(1.76819 -0.906223 1.8196)
      PhysicalOffsetFrame calcn_l_offset: socket_parent=/bodyset/calcn_l translation=(0 0 0)
          orientation=(1.76819 -0.906223 1.8196)
    PinJoint mtp_l: socket_parent_frame=calcn_l_offset socket_child_frame=toes_l_offset
      Coordinate mtp_angle_l: default_value=0 range=(-0.5235988 0.5235988) clamped=false
      PhysicalOffsetFrame calcn_l_offset: socket_parent=/bodyset/calcn_l
          translation=(0.2000135 -0.002237287 -0.001208135) orientation=(-3.14159 -0.619901 0)
      PhysicalOffsetFrame toes_l_offset: socket_parent=/bodyset/toes_l translation=(0 0 0)
          orientation=(-3.14159 -0.619901 0)
    CustomJoint back: socket_parent_frame=pelvis_offset socket_child_frame=torso_offset
      Coordinate lumbar_extension: default_value=0 range=(-1.570796 1.570796) clamped=true
      Coordinate lumbar_bending: default_value=0 range=(-1.570796 1.570796) clamped=true
      Coordinate lumbar_rotation: default_value=0 range=(-1.570796 1.570796) clamped=true
      PhysicalOffsetFrame pelvis_offset: socket_parent=/bodyset/pelvis translation=(-0.09949774 0.08306082 0)
      PhysicalOffsetFrame torso_offset: socket_parent=/bodyset/torso translation=(0 0 0)
      SpatialTransform: axes_held_at_zero=(translation1 translation2 translation3)
        TransformAxis rotation1: coordinates=lumbar_extension axis=(0 0 1) LinearFunction(coefficients=1 0)
        TransformAxis rotation2: coordinates=lumbar_bending axis=(1 0 0) LinearFunction(coefficients=1 0)
        TransformAxis rotation3: coordinates=lumbar_rotation axis=(0 1 0) LinearFunction(coefficients=1 0)
  ConstraintSet:
    CoordinateCouplerConstraint patellofemoral_knee_angle_r_con: independent_coordinate_names=knee_angle_r
        dependent_coordinate_name=knee_angle_r_beta scale_factor=1
        coupled_coordinates_function=LinearFunction(coefficients=1 0)
    CoordinateCouplerConstraint patellofemoral_knee_angle_l_con: independent_coordinate_names=knee_angle_l
        dependent_coordinate_name=knee_angle_l_beta scale_factor=1
        coupled_coordinates_function=LinearFunction(coefficients=1 0)
  ForceSet:
    Millard2012EquilibriumMuscle [values shared by the 36 below unless stated]: fiber_damping=0.01
        default_activation=0.01 minimum_activation=0.01
      ActiveForceLengthCurve: min_norm_active_fiber_length=0.25 transition_norm_fiber_length=0.77
          max_norm_active_fiber_length=1.9 shallow_ascending_slope=0.75 minimum_value=0
      ForceVelocityCurve: concentric_slope_at_vmax=0 concentric_slope_near_vmax=0.25 isometric_slope=5
          eccentric_slope_at_vmax=0 eccentric_slope_near_vmax=0.15 max_eccentric_velocity_force_multiplier=1.4
      TendonForceLengthCurve
    Millard2012EquilibriumMuscle addlong_r: max_isometric_force=1650.6 optimal_fiber_length=0.1201445
        tendon_slack_length=0.1463491 pennation_angle_at_optimal=0.1377704 [radians]
      PathPoint P1: pelvis (-0.007489502 -0.09060254 0.02126842)
      PathPoint P2: femur_r (0.01249087 -0.2655364 0.01756044)
      PathWrap: wrap_object=AL_at_femshaft_r method=hybrid
      FiberForceLengthCurve: strain_at_zero_force=-0.1917374 strain_at_one_norm_force=0.5002995
          stiffness_at_low_force=0.2 stiffness_at_one_norm_force=2.890019 curviness=0.75
    Millard2012EquilibriumMuscle addmagMid_r: max_isometric_force=2506.239 optimal_fiber_length=0.1562529
        tendon_slack_length=0.05291004 pennation_angle_at_optimal=0.2073076
      PathPoint P1: pelvis (-0.05203129 -0.1230625 0.03215046)
      PathPoint P2: femur_r (0.002684539 -0.1801525 0.03241415)
      PathWrap: wrap_object=AMmid_at_femshaft_r method=hybrid
      FiberForceLengthCurve: strain_at_zero_force=-3.981963e-9 strain_at_one_norm_force=0.7 stiffness_at_low_force=0.2
          stiffness_at_one_norm_force=2.857143 curviness=0.75
    Millard2012EquilibriumMuscle bfsh_r: max_isometric_force=886.798 optimal_fiber_length=0.1217295
        tendon_slack_length=0.1167822 pennation_angle_at_optimal=0.2642232
      PathPoint P1: femur_r (0.005546569 -0.2341761 0.02595794)
      PathPoint P2: tibia_r (-0.03242072 -0.04513051 0.03425179)
      PathWrap: wrap_object=BF_at_gastroc_r method=hybrid
      FiberForceLengthCurve: strain_at_zero_force=0.115251 strain_at_one_norm_force=0.6888986
          stiffness_at_low_force=0.2 stiffness_at_one_norm_force=3.486462 curviness=0.75
    Millard2012EquilibriumMuscle gasmed_r: max_isometric_force=4168.326 optimal_fiber_length=0.05507984
        tendon_slack_length=0.4306124 pennation_angle_at_optimal=0.1656816
      PathPoint P1: femur_r (0.00887451 -0.420208 -0.02307373)
      PathPoint P2: calcn_r (0.004922032 0.03467795 -0.005928811)
      PathWrap: wrap_object=GasMed_at_shank_r method=hybrid
      PathWrap pathwrap_0: wrap_object=Gastroc_at_condyles_r method=hybrid
      FiberForceLengthCurve: strain_at_zero_force=0.1998358 strain_at_one_norm_force=0.7902371
          stiffness_at_low_force=0.2 stiffness_at_one_norm_force=3.387526 curviness=0.75
    Millard2012EquilibriumMuscle glmax1_r: max_isometric_force=1250.015 optimal_fiber_length=0.154434
        tendon_slack_length=0.05131084 pennation_angle_at_optimal=0.3540118
      PathPoint P1: pelvis (-0.1216303 0.03516072 0.06342225)
      PathPoint P2: pelvis (-0.1241993 -0.02466346 0.08775476)
      PathPoint P3: femur_r (-0.04925353 -0.03616363 0.03350127)
      PathPoint P4: femur_r (-0.03072799 -0.06278716 0.05213775)
      PathWrap: wrap_object=Gmax1_at_pelvis_r method=hybrid
      FiberForceLengthCurve: strain_at_zero_force=-0.07534176 strain_at_one_norm_force=0.8468075
          stiffness_at_low_force=0.2 stiffness_at_one_norm_force=2.168846 curviness=0.75
    Millard2012EquilibriumMuscle glmax2_r: max_isometric_force=2265.297 optimal_fiber_length=0.1669777
        tendon_slack_length=0.07220152 pennation_angle_at_optimal=0.3673821
      PathPoint P1: pelvis (-0.1301276 0.008866616 0.05204455)
      PathPoint P2: pelvis (-0.1327954 -0.06206631 0.09158488)
      PathPoint P3: femur_r (-0.04991912 -0.06478392 0.02795471)
      PathPoint P4: femur_r (-0.01730529 -0.1127063 0.04648025)
      PathWrap: wrap_object=Gmax2_at_pelvis_r method=hybrid
      FiberForceLengthCurve: strain_at_zero_force=0.199275 strain_at_one_norm_force=0.7164175
          stiffness_at_low_force=0.2 stiffness_at_one_norm_force=3.867406 curviness=0.75
    Millard2012EquilibriumMuscle glmed1_r: max_isometric_force=2878.852 optimal_fiber_length=0.07930338
        tendon_slack_length=0.06063648 pennation_angle_at_optimal=0.3165559
      PathPoint P1: pelvis (-0.04855075 0.02665412 0.129873)
      PathPoint P2_0: femur_r (-0.01541031 -0.02029457 0.06565986)
      FiberForceLengthCurve: strain_at_zero_force=-3.729382e-9 strain_at_one_norm_force=0.7 stiffness_at_low_force=0.2
          stiffness_at_one_norm_force=2.857143 curviness=0.75
    Millard2012EquilibriumMuscle glmin2_r: max_isometric_force=1351.144 optimal_fiber_length=0.07100515
        tendon_slack_length=0.03309227 pennation_angle_at_optimal=0
      PathPoint P1: pelvis (-0.06086455 0.01019178 0.1139408)
      PathPoint P2: femur_r (0.003930899 -0.009997434 0.0581994)
      FiberForceLengthCurve: strain_at_zero_force=0.003039474 strain_at_one_norm_force=0.7000285
          stiffness_at_low_force=0.2 stiffness_at_one_norm_force=2.869486 curviness=0.75
    Millard2012EquilibriumMuscle perbrev_r: max_isometric_force=693.7511 optimal_fiber_length=0.04929262
        tendon_slack_length=0.1601766 pennation_angle_at_optimal=0.2052361
      PathPoint P1: tibia_r (-0.02617354 -0.2727218 0.02703522)
      PathPoint P2: tibia_r (-0.03651371 -0.4193152 0.0268198)
      PathPoint P3: tibia_r (-0.03069736 -0.431271 0.02746606)
      PathPoint P4: calcn_r (0.05268811 0.03020338 0.0260644)
      PathPoint P5: calcn_r (0.07573217 0.02449829 0.03836948)
      FiberForceLengthCurve: strain_at_zero_force=-0.04234068 strain_at_one_norm_force=0.6987541
          stiffness_at_low_force=0.2 stiffness_at_one_norm_force=2.69871 curviness=0.75
    Millard2012EquilibriumMuscle perlong_r: max_isometric_force=1193.261 optimal_fiber_length=0.05537037
        tendon_slack_length=0.36211 pennation_angle_at_optimal=0.2479525
      PathPoint P1: tibia_r (-0.02154201 -0.1478859 0.03037423)
      PathPoint P2: tibia_r (-0.03414408 -0.4200692 0.02552728)
      PathPoint P3: tibia_r (-0.02929713 -0.4323481 0.02585041)
      PathPoint P4: calcn_r (0.04899659 0.0257288 0.02472202)
      PathPoint P5: calcn_r (0.07617963 0.01185762 0.03176948)
      PathPoint P6: calcn_r (0.09530843 0.007718641 0.01319999)
      PathPoint P7: calcn_r (0.1345728 0.009508471 -0.02058304)
      FiberForceLengthCurve: strain_at_zero_force=-0.1323481 strain_at_one_norm_force=0.6924185
          stiffness_at_low_force=0.2 stiffness_at_one_norm_force=2.424929 curviness=0.75
    Millard2012EquilibriumMuscle piri_r: max_isometric_force=1397.275 optimal_fiber_length=0.02799773
        tendon_slack_length=0.1237351 pennation_angle_at_optimal=0.1745329
      PathPoint P1: pelvis (-0.1005945 -0.006655058 0.01521909)
      PathPoint P2: pelvis (-0.100802 -0.03124718 0.0686267)
      PathPoint P3: femur_r (-0.01641784 -0.003993529 0.04847701)
      FiberForceLengthCurve: strain_at_zero_force=0.09922992 strain_at_one_norm_force=0.7028348
          stiffness_at_low_force=0.2 stiffness_at_one_norm_force=3.313426 curviness=0.75
    Millard2012EquilibriumMuscle psoas_r: max_isometric_force=3124.74 optimal_fiber_length=0.1217481
        tendon_slack_length=0.1036715 pennation_angle_at_optimal=0.2155251
      PathPoint P1: pelvis (-0.05987649 0.06318738 0.04393371)
      PathPoint P2: pelvis (-0.02025525 -0.06665249 0.07389875)
      PathPoint P3: femur_r (-0.01464294 -0.05180495 0.005102843)
      PathPoint P4: femur_r (-0.02606887 -0.05812804 0.009761961)
      PathWrap: wrap_object=PS_at_brim_r method=hybrid range=(2 3)
      FiberForceLengthCurve: strain_at_zero_force=-0.09543841 strain_at_one_norm_force=0.5010382
          stiffness_at_low_force=0.2 stiffness_at_one_norm_force=3.353023 curviness=0.75
    Millard2012EquilibriumMuscle recfem_r: max_isometric_force=2276.817 optimal_fiber_length=0.08343991
        tendon_slack_length=0.4930469 pennation_angle_at_optimal=0.2170149
      PathPoint P1: pelvis (-0.02371346 -0.03954307 0.1051029)
      PathPoint P2: patella_r (0.01 0.049 0.0007)
      PathPoint P3: patella_r (0.0121 0.0437 -0.001)
      PathPoint P4: patella_r (0.005 0.00247 3e-5)
      PathPoint P5: tibia_r (0.03511348 -0.06798658 -0.0005062372)
      PathWrap: wrap_object=KnExt_at_fem_r method=hybrid
      FiberForceLengthCurve: strain_at_zero_force=0.1999726 strain_at_one_norm_force=0.8999622
          stiffness_at_low_force=0.2 stiffness_at_one_norm_force=2.857186 curviness=0.75
    Millard2012EquilibriumMuscle semimem_r: max_isometric_force=4011.376 optimal_fiber_length=0.07685638
        tendon_slack_length=0.3871623 pennation_angle_at_optimal=0.2545615
      PathPoint P1: pelvis (-0.09752162 -0.1161832 0.06916743)
      PathPoint P2: tibia_r (-0.03123591 -0.04491509 -0.02111117)
      PathWrap: wrap_object=SM_at_condyles_r method=hybrid
      FiberForceLengthCurve: strain_at_zero_force=0.1994426 strain_at_one_norm_force=0.7353994
          stiffness_at_low_force=0.2 stiffness_at_one_norm_force=3.731644 curviness=0.75
    Millard2012EquilibriumMuscle soleus_r: max_isometric_force=6645.947 optimal_fiber_length=0.04749042
        tendon_slack_length=0.2987103 pennation_angle_at_optimal=0.3814289
      PathPoint P1: tibia_r (-0.008185964 -0.0986624 0.01055558)
      PathPoint P2: calcn_r (0.004922032 0.03467795 -0.005928811)
      FiberForceLengthCurve: strain_at_zero_force=0.1569032 strain_at_one_norm_force=0.8506533
          stiffness_at_low_force=0.2 stiffness_at_one_norm_force=2.882882 curviness=0.75
    Millard2012EquilibriumMuscle tibant_r: max_isometric_force=1925.551 optimal_fiber_length=0.07410933
        tendon_slack_length=0.2609137 pennation_angle_at_optimal=0.1951828
      PathPoint P1: tibia_r (0.01658735 -0.1413156 0.01744903)
      PathPoint P2: tibia_r (0.02703522 -0.2052953 0.01378689)
      PathPoint P3: tibia_r (0.02509644 -0.3941111 -0.01421773)
      PathPoint P4: calcn_r (0.1304338 0.01991186 -0.03411863)
      FiberForceLengthCurve: strain_at_zero_force=0.1892237 strain_at_one_norm_force=0.7076768
          stiffness_at_low_force=0.2 stiffness_at_one_norm_force=3.85763 curviness=0.75
    Millard2012EquilibriumMuscle tibpost_r: max_isometric_force=2412.017 optimal_fiber_length=0.04095961
        tendon_slack_length=0.3042493 pennation_angle_at_optimal=0.2264891
      PathPoint P1: tibia_r (-0.004416112 -0.1404539 0.01109413)
      PathPoint P2: tibia_r (-0.01766445 -0.3936802 -0.01884926)
      PathPoint P3: calcn_r (0.04664744 0.0373627 -0.03199321)
      PathPoint P4: calcn_r (0.08635929 0.01778643 -0.03143389)
      FiberForceLengthCurve: strain_at_zero_force=-0.1916705 strain_at_one_norm_force=0.6862359
          stiffness_at_low_force=0.2 stiffness_at_one_norm_force=2.278147 curviness=0.75
    Millard2012EquilibriumMuscle vasint_r: max_isometric_force=8747.55 optimal_fiber_length=0.1095424
        tendon_slack_length=0.2230678 pennation_angle_at_optimal=0.06309973
      PathPoint P1: femur_r (0.0321701 -0.213432 0.03438873)
      PathPoint P2: femur_r (0.03716201 -0.231181 0.03161544)
      PathPoint P3: patella_r (0.0058 0.048 -0.0006)
      PathPoint P4: patella_r (0.005 0.00247 -0.00039)
      PathPoint P5: tibia_r (0.03508116 -0.06807275 0.0004631532)
      PathWrap: wrap_object=KnExt_at_fem_r method=hybrid
      FiberForceLengthCurve: strain_at_zero_force=0.1999153 strain_at_one_norm_force=0.8514363
          stiffness_at_low_force=0.2 stiffness_at_one_norm_force=3.06974 curviness=0.75
    Millard2012EquilibriumMuscle addlong_l: max_isometric_force=1650.6 optimal_fiber_length=0.1201445
        tendon_slack_length=0.1463491 pennation_angle_at_optimal=0.1377704
      PathPoint P1: pelvis (-0.007489502 -0.09060254 -0.02126842)
      PathPoint P2: femur_l (0.01249087 -0.2655364 -0.01756044)
      PathWrap: wrap_object=AL_at_femshaft_l method=hybrid
      FiberForceLengthCurve: strain_at_zero_force=-0.1917374 strain_at_one_norm_force=0.5002995
          stiffness_at_low_force=0.2 stiffness_at_one_norm_force=2.890019 curviness=0.75
    Millard2012EquilibriumMuscle addmagMid_l: max_isometric_force=2506.239 optimal_fiber_length=0.1562529
        tendon_slack_length=0.05291004 pennation_angle_at_optimal=0.2073076
      PathPoint P1: pelvis (-0.05203129 -0.1230625 -0.03215046)
      PathPoint P2: femur_l (0.002684539 -0.1801525 -0.03241415)
      PathWrap: wrap_object=AMmid_at_femshaft_l method=hybrid
      FiberForceLengthCurve: strain_at_zero_force=-3.981963e-9 strain_at_one_norm_force=0.7 stiffness_at_low_force=0.2
          stiffness_at_one_norm_force=2.857143 curviness=0.75
    Millard2012EquilibriumMuscle bfsh_l: max_isometric_force=886.798 optimal_fiber_length=0.1217293
        tendon_slack_length=0.116782 pennation_angle_at_optimal=0.2642232
      PathPoint P1: femur_l (0.005546569 -0.2341761 -0.02595794)
      PathPoint P2: tibia_l (-0.03242072 -0.04513051 -0.03425179)
      PathWrap: wrap_object=BF_at_gastroc_l method=hybrid
      FiberForceLengthCurve: strain_at_zero_force=0.115251 strain_at_one_norm_force=0.6888986
          stiffness_at_low_force=0.2 stiffness_at_one_norm_force=3.486462 curviness=0.75
    Millard2012EquilibriumMuscle gasmed_l: max_isometric_force=4168.326 optimal_fiber_length=0.05507984
        tendon_slack_length=0.4306124 pennation_angle_at_optimal=0.1656816
      PathPoint P1: femur_l (0.00887451 -0.420208 0.02307373)
      PathPoint P2: calcn_l (0.004922032 0.03467795 0.005928811)
      PathWrap: wrap_object=GasMed_at_shank_l method=hybrid
      PathWrap pathwrap_0: wrap_object=Gastroc_at_condyles_l method=hybrid
      FiberForceLengthCurve: strain_at_zero_force=0.1998358 strain_at_one_norm_force=0.7902371
          stiffness_at_low_force=0.2 stiffness_at_one_norm_force=3.387526 curviness=0.75
    Millard2012EquilibriumMuscle glmax1_l: max_isometric_force=1250.015 optimal_fiber_length=0.154434
        tendon_slack_length=0.05131084 pennation_angle_at_optimal=0.3540118
      PathPoint P1: pelvis (-0.1216303 0.03516072 -0.06342225)
      PathPoint P2: pelvis (-0.1241993 -0.02466346 -0.08775476)
      PathPoint P3: femur_l (-0.04925353 -0.03616363 -0.03350127)
      PathPoint P4: femur_l (-0.03072799 -0.06278716 -0.05213775)
      PathWrap: wrap_object=Gmax1_at_pelvis_l method=hybrid
      FiberForceLengthCurve: strain_at_zero_force=-0.07534176 strain_at_one_norm_force=0.8468075
          stiffness_at_low_force=0.2 stiffness_at_one_norm_force=2.168846 curviness=0.75
    Millard2012EquilibriumMuscle glmax2_l: max_isometric_force=2265.297 optimal_fiber_length=0.1669777
        tendon_slack_length=0.07220152 pennation_angle_at_optimal=0.3673821
      PathPoint P1: pelvis (-0.1301276 0.008866616 -0.05204455)
      PathPoint P2: pelvis (-0.1327954 -0.06206631 -0.09158488)
      PathPoint P3: femur_l (-0.04991912 -0.06478392 -0.02795471)
      PathPoint P4: femur_l (-0.01730529 -0.1127063 -0.04648025)
      PathWrap: wrap_object=Gmax2_at_pelvis_l method=hybrid
      FiberForceLengthCurve: strain_at_zero_force=0.199275 strain_at_one_norm_force=0.7164175
          stiffness_at_low_force=0.2 stiffness_at_one_norm_force=3.867406 curviness=0.75
    Millard2012EquilibriumMuscle glmed1_l: max_isometric_force=2879.147 optimal_fiber_length=0.07905865
        tendon_slack_length=0.06044936 pennation_angle_at_optimal=0.3165559
      PathPoint P1: pelvis (-0.04841499 0.02649793 -0.1295481)
      PathPoint P2: femur_l (-0.01553039 -0.01996765 -0.06544951)
      FiberForceLengthCurve: strain_at_zero_force=-3.729382e-9 strain_at_one_norm_force=0.7 stiffness_at_low_force=0.2
          stiffness_at_one_norm_force=2.857143 curviness=0.75
    Millard2012EquilibriumMuscle glmin2_l: max_isometric_force=1351.266 optimal_fiber_length=0.07095689
        tendon_slack_length=0.03306978 pennation_angle_at_optimal=0
      PathPoint P1: pelvis (-0.06086455 0.01019151 -0.113777)
      PathPoint P2: femur_l (0.004437255 -0.009983824 -0.05768431)
      FiberForceLengthCurve: strain_at_zero_force=0.003039474 strain_at_one_norm_force=0.7000285
          stiffness_at_low_force=0.2 stiffness_at_one_norm_force=2.869486 curviness=0.75
    Millard2012EquilibriumMuscle perbrev_l: max_isometric_force=693.7511 optimal_fiber_length=0.04929262
        tendon_slack_length=0.1601766 pennation_angle_at_optimal=0.2052361
      PathPoint P1: tibia_l (-0.02617354 -0.2727218 -0.02703522)
      PathPoint P2: tibia_l (-0.03651371 -0.4193152 -0.0268198)
      PathPoint P3: tibia_l (-0.03069736 -0.431271 -0.02746606)
      PathPoint P4: calcn_l (0.05268811 0.03020338 -0.0260644)
      PathPoint P5: calcn_l (0.07573217 0.02449829 -0.03836948)
      FiberForceLengthCurve: strain_at_zero_force=-0.04234068 strain_at_one_norm_force=0.6987541
          stiffness_at_low_force=0.2 stiffness_at_one_norm_force=2.69871 curviness=0.75
    Millard2012EquilibriumMuscle perlong_l: max_isometric_force=1193.261 optimal_fiber_length=0.05537037
        tendon_slack_length=0.36211 pennation_angle_at_optimal=0.2479525
      PathPoint P1: tibia_l (-0.02154201 -0.1478859 -0.03037423)
      PathPoint P2: tibia_l (-0.03414408 -0.4200692 -0.02552728)
      PathPoint P3: tibia_l (-0.02929713 -0.4323481 -0.02585041)
      PathPoint P4: calcn_l (0.04899659 0.0257288 -0.02472202)
      PathPoint P5: calcn_l (0.07617963 0.01185762 -0.03176948)
      PathPoint P6: calcn_l (0.09530843 0.007718641 -0.01319999)
      PathPoint P7: calcn_l (0.1345728 0.009508471 0.02058304)
      FiberForceLengthCurve: strain_at_zero_force=-0.1323481 strain_at_one_norm_force=0.6924185
          stiffness_at_low_force=0.2 stiffness_at_one_norm_force=2.424929 curviness=0.75
    Millard2012EquilibriumMuscle piri_l: max_isometric_force=1397.275 optimal_fiber_length=0.02799773
        tendon_slack_length=0.1237351 pennation_angle_at_optimal=0.1745329
      PathPoint P1: pelvis (-0.1005945 -0.006655058 -0.01521909)
      PathPoint P2: pelvis (-0.100802 -0.03124718 -0.0686267)
      PathPoint P3: femur_l (-0.01641784 -0.003993529 -0.04847701)
      FiberForceLengthCurve: strain_at_zero_force=0.09922992 strain_at_one_norm_force=0.7028348
          stiffness_at_low_force=0.2 stiffness_at_one_norm_force=3.313426 curviness=0.75
    Millard2012EquilibriumMuscle psoas_l: max_isometric_force=3124.74 optimal_fiber_length=0.1217481
        tendon_slack_length=0.1036715 pennation_angle_at_optimal=0.2155251
      PathPoint P1: pelvis (-0.05987649 0.06318738 -0.04393371)
      PathPoint P2: pelvis (-0.02025525 -0.06665249 -0.07389875)
      PathPoint P3: femur_l (-0.01464294 -0.05180495 -0.005102843)
      PathPoint P4: femur_l (-0.02606887 -0.05812804 -0.009761961)
      PathWrap: wrap_object=PS_at_brim_l method=hybrid range=(2 3)
      FiberForceLengthCurve: strain_at_zero_force=-0.09543841 strain_at_one_norm_force=0.5010382
          stiffness_at_low_force=0.2 stiffness_at_one_norm_force=3.353023 curviness=0.75
    Millard2012EquilibriumMuscle recfem_l: max_isometric_force=2276.817 optimal_fiber_length=0.08344009
        tendon_slack_length=0.493048 pennation_angle_at_optimal=0.2170149
      PathPoint P1: pelvis (-0.02371346 -0.03954307 -0.1051029)
      PathPoint P2: patella_l (0.01 0.049 -0.0007)
      PathPoint P3: patella_l (0.0121 0.0437 0.001)
      PathPoint P4: patella_l (0.005 0.00247 -3e-5)
      PathPoint P5: tibia_l (0.03511348 -0.06798658 0.0005062372)
      PathWrap: wrap_object=KnExt_at_fem_l method=hybrid
      FiberForceLengthCurve: strain_at_zero_force=0.1999726 strain_at_one_norm_force=0.8999622
          stiffness_at_low_force=0.2 stiffness_at_one_norm_force=2.857186 curviness=0.75
    Millard2012EquilibriumMuscle semimem_l: max_isometric_force=4011.376 optimal_fiber_length=0.07685624
        tendon_slack_length=0.3871616 pennation_angle_at_optimal=0.2545615
      PathPoint P1: pelvis (-0.09752162 -0.1161832 -0.06916743)
      PathPoint P2: tibia_l (-0.03123591 -0.04491509 0.02111117)
      PathWrap: wrap_object=SM_at_condyles_l method=hybrid
      FiberForceLengthCurve: strain_at_zero_force=0.1994426 strain_at_one_norm_force=0.7353994
          stiffness_at_low_force=0.2 stiffness_at_one_norm_force=3.731644 curviness=0.75
    Millard2012EquilibriumMuscle soleus_l: max_isometric_force=6645.947 optimal_fiber_length=0.04749042
        tendon_slack_length=0.2987103 pennation_angle_at_optimal=0.3814289
      PathPoint P1: tibia_l (-0.008185964 -0.0986624 -0.01055558)
      PathPoint P2: calcn_l (0.004922032 0.03467795 0.005928811)
      FiberForceLengthCurve: strain_at_zero_force=0.1569032 strain_at_one_norm_force=0.8506533
          stiffness_at_low_force=0.2 stiffness_at_one_norm_force=2.882882 curviness=0.75
    Millard2012EquilibriumMuscle tibant_l: max_isometric_force=1925.551 optimal_fiber_length=0.07410933
        tendon_slack_length=0.2609137 pennation_angle_at_optimal=0.1951828
      PathPoint P1: tibia_l (0.01658735 -0.1413156 -0.01744903)
      PathPoint P2: tibia_l (0.02703522 -0.2052953 -0.01378689)
      PathPoint P3: tibia_l (0.02509644 -0.3941111 0.01421773)
      PathPoint P4: calcn_l (0.1304338 0.01991186 0.03411863)
      FiberForceLengthCurve: strain_at_zero_force=0.1892237 strain_at_one_norm_force=0.7076768
          stiffness_at_low_force=0.2 stiffness_at_one_norm_force=3.85763 curviness=0.75
    Millard2012EquilibriumMuscle tibpost_l: max_isometric_force=2412.017 optimal_fiber_length=0.04095961
        tendon_slack_length=0.3042493 pennation_angle_at_optimal=0.2264891
      PathPoint P1: tibia_l (-0.004416112 -0.1404539 -0.01109413)
      PathPoint P2: tibia_l (-0.01766445 -0.3936802 0.01884926)
      PathPoint P3: calcn_l (0.04664744 0.0373627 0.03199321)
      PathPoint P4: calcn_l (0.08635929 0.01778643 0.03143389)
      FiberForceLengthCurve: strain_at_zero_force=-0.1916705 strain_at_one_norm_force=0.6862359
          stiffness_at_low_force=0.2 stiffness_at_one_norm_force=2.278147 curviness=0.75
    Millard2012EquilibriumMuscle vasint_l: max_isometric_force=8747.55 optimal_fiber_length=0.1095428
        tendon_slack_length=0.2230687 pennation_angle_at_optimal=0.06309973
      PathPoint P1: femur_l (0.0321701 -0.213432 -0.03438873)
      PathPoint P2: femur_l (0.03716201 -0.231181 -0.03161544)
      PathPoint P3: patella_l (0.0058 0.048 0.0006)
      PathPoint P4: patella_l (0.005 0.00247 0.00039)
      PathPoint P5: tibia_l (0.03508116 -0.06807275 -0.0004631532)
      PathWrap: wrap_object=KnExt_at_fem_l method=hybrid
      FiberForceLengthCurve: strain_at_zero_force=0.1999153 strain_at_one_norm_force=0.8514363
          stiffness_at_low_force=0.2 stiffness_at_one_norm_force=3.06974 curviness=0.75
    ExpressionBasedCoordinateForce PassiveHipDampingX_r: coordinate=hip_flexion_r
        expression=-2.44*exp(5.05*(q-1.81))+1.51*exp(-21.88*(q+0.47))-0.1*qdot
    ExpressionBasedCoordinateForce PassiveHipDampingY_r: coordinate=hip_adduction_r
        expression=-0.03*exp(14.94*(q-0.50))+0.03*exp(-14.94*(q+0.50))-0.1*qdot
    ExpressionBasedCoordinateForce PassiveHipDampingZ_r: coordinate=hip_rotation_r
        expression=-0.03*exp(14.94*(q-0.92))+0.03*exp(-14.94*(q+0.92))-0.1*qdot
    ExpressionBasedCoordinateForce PassiveHipDampingX_l: coordinate=hip_flexion_l
        expression=-2.44*exp(5.05*(q-1.81))+1.51*exp(-21.88*(q+0.47))-0.1*qdot
    ExpressionBasedCoordinateForce PassiveHipDampingY_l: coordinate=hip_adduction_l
        expression=-0.03*exp(14.94*(q-0.50))+0.03*exp(-14.94*(q+0.50))-0.1*qdot
    ExpressionBasedCoordinateForce PassiveHipDampingZ_l: coordinate=hip_rotation_l
        expression=-0.03*exp(14.94*(q-0.92))+0.03*exp(-14.94*(q+0.92))-0.1*qdot
    ExpressionBasedCoordinateForce PassiveAnkleDamping_r: coordinate=ankle_angle_r
        expression=-2.03*exp(38.11*(q-0.52))+0.18*exp(-42.12*(q+0.74))-0.1*qdot
    ExpressionBasedCoordinateForce PassiveAnkleDamping_l: coordinate=ankle_angle_l
        expression=-2.03*exp(38.11*(q-0.52))+0.18*exp(-42.12*(q+0.74))-0.1*qdot
    ExpressionBasedCoordinateForce PassiveSubtalarDamping_r: coordinate=subtalar_angle_r
        expression=-60.21*exp(16.32*(q-0.65))+60.21*exp(-16.32*(q+0.65))
    ExpressionBasedCoordinateForce PassiveSubtalarDamping_l: coordinate=subtalar_angle_l
        expression=-60.21*exp(16.32*(q-0.65))+60.21*exp(-16.32*(q+0.65))
    ExpressionBasedCoordinateForce PassiveToeMoment_r: coordinate=mtp_angle_r
        expression=-50.*exp(25.*(q-0.4))+50.*exp(-25.*(q+0.4))
    ExpressionBasedCoordinateForce PassiveToeMoment_l: coordinate=subtalar_angle_l
        expression=-50.*exp(25.*(q-0.4))+50.*exp(-25.*(q+0.4))
    CoordinateLimitForce limit_force_knee_angle_r: coordinate=knee_angle_r upper_stiffness=10 [N*m/degree]
        upper_limit=120 [degrees] lower_stiffness=10 [N*m/degree] lower_limit=0 [degrees] damping=0.001
        transition=0.5 [degrees] compute_dissipation_energy=false
    CoordinateLimitForce limit_force_knee_angle_l: coordinate=knee_angle_l upper_stiffness=10 upper_limit=120
        lower_stiffness=10 lower_limit=0 damping=0.001 transition=0.5 compute_dissipation_energy=false
    SmoothSphereHalfSpaceForce [values shared by the 12 below unless stated]: socket_half_space=/contactgeometryset/floor
        stiffness=30000000 [N/m^2] dissipation=2 [s/m] static_friction=0.5 dynamic_friction=0.5 viscous_friction=0.5
        transition_velocity=0.2 [m/s] hertz_smoothing=300 hunt_crossley_smoothing=50
    SmoothSphereHalfSpaceForce contactHeel_r: socket_sphere=/contactgeometryset/heel_r
    SmoothSphereHalfSpaceForce contactLateralRearfoot_r: socket_sphere=/contactgeometryset/lateralRearfoot_r
    SmoothSphereHalfSpaceForce contactLateralMidfoot_r: socket_sphere=/contactgeometryset/lateralMidfoot_r
    SmoothSphereHalfSpaceForce contactLateralToe_r: socket_sphere=/contactgeometryset/lateralToe_r
    SmoothSphereHalfSpaceForce contactMedialToe_r: socket_sphere=/contactgeometryset/medialToe_r
    SmoothSphereHalfSpaceForce contactMedialMidfoot_r: socket_sphere=/contactgeometryset/medialMidfoot_r
    SmoothSphereHalfSpaceForce contactHeel_l: socket_sphere=/contactgeometryset/heel_l
    SmoothSphereHalfSpaceForce contactLateralRearfoot_l: socket_sphere=/contactgeometryset/lateralRearfoot_l
    SmoothSphereHalfSpaceForce contactLateralMidfoot_l: socket_sphere=/contactgeometryset/lateralMidfoot_l
    SmoothSphereHalfSpaceForce contactLateralToe_l: socket_sphere=/contactgeometryset/lateralToe_l
    SmoothSphereHalfSpaceForce contactMedialToe_l: socket_sphere=/contactgeometryset/medialToe_l
    SmoothSphereHalfSpaceForce contactMedialMidfoot_l: socket_sphere=/contactgeometryset/medialMidfoot_l
    SpringGeneralizedForce passive_stiffness_lumbar_extension: coordinate=lumbar_extension stiffness=72.85 viscosity=2
    SpringGeneralizedForce passive_stiffness_lumbar_bending: coordinate=lumbar_bending stiffness=109.275 viscosity=2
    SpringGeneralizedForce passive_stiffness_lumbar_rotation: coordinate=lumbar_rotation stiffness=36.425 viscosity=2
    SpringGeneralizedForce passive_stiffness_subtalar_angle_r: coordinate=subtalar_angle_r stiffness=364.25 viscosity=2
    SpringGeneralizedForce passive_stiffness_subtalar_angle_l: coordinate=subtalar_angle_l stiffness=364.25 viscosity=2
    SpringGeneralizedForce passive_stiffness_mtp_angle_r: coordinate=mtp_angle_r stiffness=72.85 viscosity=2
    SpringGeneralizedForce passive_stiffness_mtp_angle_l: coordinate=mtp_angle_l stiffness=72.85 viscosity=2
    ObjectGroup right_leg: members=(addlong_r addmagMid_r bfsh_r gasmed_r glmax1_r glmax2_r glmed1_r glmin2_r perbrev_r perlong_r piri_r psoas_r recfem_r semimem_r soleus_r tibant_r tibpost_r vasint_r)
    ObjectGroup left_leg: members=(addlong_l addmagMid_l bfsh_l gasmed_l glmax1_l glmax2_l glmed1_l glmin2_l perbrev_l perlong_l piri_l psoas_l recfem_l semimem_l soleus_l tibant_l tibpost_l vasint_l)
    ObjectGroup hip_add_r: members=(addlong_r addmagMid_r semimem_r)
    ObjectGroup hip_abd_r: members=(glmax1_r glmed1_r glmin2_r piri_r)
    ObjectGroup hip_flex_r: members=(addlong_r psoas_r recfem_r)
    ObjectGroup hip_ext_r: members=(addlong_r addmagMid_r glmax1_r glmax2_r glmed1_r semimem_r)
    ObjectGroup hip_inrot_r: members=(glmed1_r psoas_r)
    ObjectGroup hip_exrot_r: members=piri_r
    ObjectGroup knee_flex_r: members=(bfsh_r gasmed_r semimem_r)
    ObjectGroup knee_ext_r: members=(recfem_r vasint_r)
    ObjectGroup ankle_df_r: members=tibant_r
    ObjectGroup ankle_pf_r: members=(gasmed_r perbrev_r perlong_r soleus_r tibpost_r)
    ObjectGroup everter_r: members=(perbrev_r perlong_r)
    ObjectGroup inverter_r: members=(tibant_r tibpost_r)
    ObjectGroup hip_add_l: members=(addlong_l addmagMid_l semimem_l)
    ObjectGroup hip_abd_l: members=(glmax1_l glmed1_l glmin2_l piri_l)
    ObjectGroup hip_flex_l: members=(addlong_l psoas_l recfem_l)
    ObjectGroup hip_ext_l: members=(addlong_l addmagMid_l glmax1_l glmax2_l glmed1_l semimem_l)
    ObjectGroup hip_exrot_l: members=piri_l
    ObjectGroup hip_inrot_l: members=(glmed1_l psoas_l)
    ObjectGroup knee_flex_l: members=(bfsh_l gasmed_l semimem_l)
    ObjectGroup knee_ext_l: members=(recfem_l vasint_l)
    ObjectGroup ankle_df_l: members=tibant_l
    ObjectGroup ankle_pf_l: members=(gasmed_l perbrev_l perlong_l soleus_l tibpost_l)
    ObjectGroup everter_l: members=(perbrev_l perlong_l)
    ObjectGroup inverter_l: members=(tibant_l tibpost_l)
  MarkerSet:
    Marker RACR: torso (0.003995158 0.4121413 0.1452154)
    Marker LACR: torso (-0.01493658 0.4155634 -0.1468099)
    Marker C7: torso (-0.05646481 0.4249099 -0.01190038)
    Marker CLAV: torso (0.06458649 0.3700636 0.0304649)
    Marker RASH: torso (0.05620086 0.3728326 0.1585408)
    Marker RPSH: torso (-0.08095438 0.3468875 0.1661301)
    Marker LASH: torso (0.04710752 0.3804007 -0.1583903)
    Marker LPSH: torso (-0.07417916 0.353754 -0.1736477)
    Marker RASI: pelvis (0.009416685 0.01842788 0.1447154) fixed=true
    Marker LASI: pelvis (0.009416685 0.01842788 -0.1447154) fixed=true
    Marker RPSI: pelvis (-0.1531494 0.03567029 0.05069274) fixed=true
    Marker LPSI: pelvis (-0.1531494 0.03567029 -0.05069274) fixed=true
    Marker LHJC: femur_l (0 0 0) fixed=true
    Marker RHJC: femur_r (0 0 0) fixed=true
    Marker RTH1: femur_r (0.04210284 -0.03665399 0.1022114)
    Marker RTH2: femur_r (-0.04516882 -0.1756368 0.07360129)
    Marker RTH3: femur_r (-0.01136849 -0.3284226 0.06772542)
    Marker RLFC: femur_r (0 -0.4481627 0.05546569) fixed=true
    Marker RMFC: femur_r (0 -0.4481627 -0.05546569) fixed=true
    Marker RKJC: tibia_r (0 0 0) fixed=true
    Marker RTB1: tibia_r (0.04062804 -0.132056 0.009835111)
    Marker RTB2: tibia_r (-0.03637053 -0.1803766 0.07420044)
    Marker RTB3: tibia_r (0.02606683 -0.3203656 -0.0006399197)
    Marker RLMAL: tibia_r (-0.005385502 -0.4187767 0.05708632) fixed=true
    Marker RMMAL: tibia_r (0.006462603 -0.4187767 -0.04092982) fixed=true
    Marker RAJC: talus_r (0 0 0) fixed=true
    Marker RCAL: calcn_r (-0.02796609 0.02237287 -0.005593218) fixed=true
    Marker RTOE: calcn_r (0.2293219 -0.005 -0.03355931) fixed=true
    Marker RMT5: calcn_r (0.1622033 -0.015 0.06599997) fixed=true
    Marker LTH1: femur_l (0.04118162 -0.04057106 -0.09443858)
    Marker LTH2: femur_l (-0.04495287 -0.1902701 -0.06424203)
    Marker LTH3: femur_l (-0.002375107 -0.3258121 -0.06668873)
    Marker LLFC: femur_l (0 -0.4481627 -0.05546569) fixed=true
    Marker LMFC: femur_l (0 -0.4481627 0.05546569) fixed=true
    Marker LKJC: tibia_l (0 0 0) fixed=true
    Marker LTB1: tibia_l (0.04422089 -0.09985024 -0.01481304)
    Marker LTB2: tibia_l (-0.03186919 -0.2084828 -0.0680255)
    Marker LTB3: tibia_l (0.03215749 -0.3145763 -0.01332234)
    Marker LLMAL: tibia_l (-0.005385502 -0.4187767 -0.05708632) fixed=true
    Marker LMMAL: tibia_l (0.006462603 -0.4187767 0.04092982) fixed=true
    Marker LAJC: talus_l (0 0 0) fixed=true
    Marker LCAL: calcn_l (-0.02796609 0.02237287 0.005593218) fixed=true
    Marker LTOE: calcn_l (0.2293219 -0.005 0.03355931) fixed=true
    Marker LMT5: calcn_l (0.1622033 -0.015 -0.06599997) fixed=true
  ContactGeometrySet:
    ContactHalfSpace floor: socket_frame=/ground orientation=(0 0 -1.570796)
    ContactSphere heel_r: socket_frame=/bodyset/calcn_r location=(0.0146421 0 -0.0122799) radius=0.035
    ContactSphere lateralRearfoot_r: socket_frame=/bodyset/calcn_r location=(0.0849291 0 0.0338649) radius=0.035
    ContactSphere lateralMidfoot_r: socket_frame=/bodyset/calcn_r location=(0.153362 0 0.0594829) radius=0.035
    ContactSphere lateralToe_r: socket_frame=/bodyset/toes_r location=(0.023014 0 0.0670461) radius=0.035
    ContactSphere medialToe_r: socket_frame=/bodyset/toes_r location=(0.074363 0 -0.026039) radius=0.035
    ContactSphere medialMidfoot_r: socket_frame=/bodyset/calcn_r location=(0.203637 0 -0.0398688) radius=0.035
    ContactSphere heel_l: socket_frame=/bodyset/calcn_l location=(0.0146421 0 0.0122799) radius=0.035
    ContactSphere lateralRearfoot_l: socket_frame=/bodyset/calcn_l location=(0.0849291 0 -0.0338649) radius=0.035
    ContactSphere lateralMidfoot_l: socket_frame=/bodyset/calcn_l location=(0.153362 0 -0.0594829) radius=0.035
    ContactSphere lateralToe_l: socket_frame=/bodyset/toes_l location=(0.023014 0 -0.0670461) radius=0.035
    ContactSphere medialToe_l: socket_frame=/bodyset/toes_l location=(0.074363 0 0.026039) radius=0.035
    ContactSphere medialMidfoot_l: socket_frame=/bodyset/calcn_l location=(0.203637 0 0.0398688) radius=0.035
